// SBML level 2 version 4

model MODEL_to_be_done()
  // JPLeRouzic2018 - Interaction between astrocytes and neurons in Amyotrophic lateral sclerosis (ALS)
  // JPLeRouzic2018 - Interactions between astrocytes and neurons in Amyotrophic lateral sclerosis (ALS)
  // Encoded non-curated model. Issues:
  // To be done
  // This model is described in the article:
  // Motor neuron-immune interactions: The vicious circle of ALS.
  // Barbeito AG, Mesci P, Boillée S.
  // J Neural Transm (Vienna). 2010 Aug;117(8):981-1000.
  // Abstract:
  // Because microglial cells, the resident macrophages of the CNS, react to any lesion of the nervous system,
  // they have for long been regarded as potential players in the pathogenesis of several neurodegenerative disorders including amyotrophic lateral sclerosis,
  // the most common motor neuron disease in the adult.
  // In recent years, this microglial reaction to motor neuron injury, in particular, and the innate immune response, in general,
  // has been implicated in the progression of the disease, in mouse models of ALS.
  // The mechanisms by which microglial cells influence motor neuron death in ALS are still largely unknown.
  // Microglial activation increases over the course of the disease and is associated with an alteration in the production of toxic factors and also
  // neurotrophic factors.
  // Adding to the microglial/macrophage response to motor neuron degeneration, the adaptive immune system can likewise influence the disease process.
  // Exploring these motor neuron-immune interactions could lead to a better understanding in the physiopathology of ALS to find
  // new pathways to slow down motor neuron degeneration.
  // This model will be hosted on BioModels Database and identified by: MODEL-to-be-done .
  // To cite BioModels Database, please use: BioModels Database: An enhanced, curated and annotated resource for published quantitative kinetic models .
  // To the extent possible under law, all copyright and related or neighbouring rights to this encoded model have been dedicated to the public domain worldwide. Please refer to CC0 Public Domain Dedication for more information.

  // Compartments:
  compartment CentralNervousSystem = 1;
  compartment Extracellular_space = 0.2;
  compartment Capillaries = 0.0055;
  compartment Veins = 0.0237;

  // Species:
  // Pre-Synaptic Neurons
  species $PreSynapticNeurons in CentralNervousSystem = 999999;
  // Exocytosis
  species $Exocytosis in CentralNervousSystem = 999999;
  // A motor unit is made up of a motor neuron and the skeletal muscle fibers innervated by that motor neuron's axonal terminals.
  // Groups of motor units often work together to coordinate the contractions of a single muscle.
  // All of the motor units within a muscle are considered a motor pool.
  species $BrokenMotorUnit in CentralNervousSystem = 1;
  // Surviving Upper neurons
  // Upper motor neurons are found in the brain and carry motor information down the spinal cord to activate the lower motor neurons,
  species $LivingUpperMotoNeurons in CentralNervousSystem = 999999;
  // Dead Upper neurons
  // Upper motor neurons are found in the brain and carry motor information down the spinal cord to activate the lower motor neurons,
  species $DeadUpperMotoNeurons in CentralNervousSystem = 1;
  // Surviving lower motor neurons
  // The efferent fiber carries nerve impulses away from the the spinal cord, and toward the muscles.
  species $LivingLowerMotoNeurons in CentralNervousSystem = 999999;
  // Dead lower motor neurons
  // The efferent fiber carries nerve impulses away from the the spinal cord, and toward the muscles.
  species $DeadLowerMotoNeurons in CentralNervousSystem = 1;
  // Quiescent astroglia
  species $Non_Inflammatory_Astroglia in CentralNervousSystem = 200;
  // Proliferating astroglia
  species $Pro_Inflammatory_Astroglia in CentralNervousSystem = 50;
  // Normal microglia
  species $Anti_Inflammatory_Microglia in CentralNervousSystem = 200;
  // Reactive microglia
  species $Pro_Inflammatory_Microglia in CentralNervousSystem = 50;
  // They are the largest type of leukocyte and can differentiate into macrophages and myeloid lineage dendritic cells.
  // Monocytes can differentiate into dendritic cells by adding the cytokines granulocyte macrophage colony-stimulating factor (GM-CSF) and interleukin 4.
  species $Monocyte in CentralNervousSystem = 1;
  // B cells, also known as B lymphocytes, are a type of white blood cell.
  // * They secrete antibodies.
  // * B cells are also classified as professional antigen-presenting cells (APCs)).
  // * B cells secrete cytokines.
  species $B_Cell in CentralNervousSystem = 1;
  // T cell, or T lymphocyte, is a type of lymphocyte that plays a central role in cell-mediated immunity.
  // They mature in the thymus which "selects for" T cells capable of interacting with MHC, and kill the "non-self" cells.
  // On can further categorize T cells in:
  // * Cytotoxic T cells (CD8+ T cells)
  // * Helper T cells (CD4+ T cells)
  // * Regulatory T cells
  // * Natural Killer T cells
  species $T_Cell in CentralNervousSystem = 1;
  // Dendritic cells are antigen-presenting cells. They process ("eat") material found in the ECM and present it to the T cells.
  // They act as messengers between the innate and the adaptive immune systems.
  species $DentriticCell in CentralNervousSystem = 1;
  // Cytokines
  species $Cytokines in CentralNervousSystem = 1;

  // Parameters:
  //           Dead neurons
  prmDeadNeurons = 1;
  //           Living neurons
  prmLivingNeurons = 0.5;
  //           Pro Inflammatory Microglia
  prmProInflamMicroglia = 0;
  //           Anti Inflammatory Microglia
  prmAntiInflamMicroglia = 1;
  //           Pro Inflammatory Astroglia
  prmProInflamAstroglia = 1;
  //           Quiescent astroglia
  prmNonInflamAstroglia = 0.5;
  //           Toxic output from astroglia
  prmTxcAstroglia = 20;
  //           Toxic output from microglia
  prmTxcMicroglia = 20;
  //           Controls the production of CD4 T_Lymphocytes in a dependency with the number of dying neurons
  prmCD4Lymphocytes = 0.5;
  //          Controls the production of CD8 T_Lymphocytes in a dependency with the number of dying neurons
  prmCD8Lymphocytes = 0.5;
  NbOfNeurons = 1000000; NbOfNeurons is "Nb of neurons";
  NbOfMicroglia = 100000; NbOfMicroglia is "Nb of microglia";
  NbOfAstrocytes = 200000; NbOfAstrocytes is "Nb of astrocytes";

  // Rate rules:
  DeadLowerMotoNeurons' = NbOfNeurons*((prmProInflamAstroglia*Pro_Inflammatory_Astroglia + prmProInflamMicroglia*Pro_Inflammatory_Microglia)/(NbOfAstrocytes + NbOfMicroglia));
  LivingLowerMotoNeurons' = -DeadLowerMotoNeurons;
  Non_Inflammatory_Astroglia' = prmAntiInflamMicroglia*Anti_Inflammatory_Microglia - prmProInflamAstroglia*Pro_Inflammatory_Microglia;
  Pro_Inflammatory_Astroglia' = prmProInflamMicroglia*Pro_Inflammatory_Microglia;
  Anti_Inflammatory_Microglia' = prmLivingNeurons*Non_Inflammatory_Astroglia - prmDeadNeurons*DeadLowerMotoNeurons/10;
  Pro_Inflammatory_Microglia' = DeadLowerMotoNeurons;
  CD4_T_Lymphocytes' = prmCD4Lymphocytes*DeadLowerMotoNeurons;
  CD8_T_Lymphocytes' = prmCD8Lymphocytes*DeadLowerMotoNeurons;
  ToxicFactors_Astroglia' = prmProInflamAstroglia*Pro_Inflammatory_Astroglia;
  ToxicFactors_Microglia' = prmProInflamMicroglia*Pro_Inflammatory_Microglia;

  // Unit definitions:
  unit volume = 1e-3 litre;
  unit time = second;
  unit substance = dimensionless;
end
