// SBML level 2 version 4

model MODEL_to_be_done()
  // JPLeRouzic2018 - Interaction between astrocytes and neurons in Amyotrophic lateral sclerosis (ALS)
  // JPLeRouzic2018 - Interactions between astrocytes and neurons in Amyotrophic lateral sclerosis (ALS)
  // Encoded non-curated model. Issues:
  // To be done
  // This model is described in the article:
  // Motor neuron-immune interactions: The vicious circle of ALS.
  // Barbeito AG, Mesci P, Boillée S.
  // J Neural Transm (Vienna). 2010 Aug;117(8):981-1000.
  // Abstract:
  // Because microglial cells, the resident macrophages of the CNS, react to any lesion of the nervous system,
  // they have for long been regarded as potential players in the pathogenesis of several neurodegenerative disorders including amyotrophic lateral sclerosis,
  // the most common motor neuron disease in the adult.
  // In recent years, this microglial reaction to motor neuron injury, in particular, and the innate immune response, in general,
  // has been implicated in the progression of the disease, in mouse models of ALS.
  // The mechanisms by which microglial cells influence motor neuron death in ALS are still largely unknown.
  // Microglial activation increases over the course of the disease and is associated with an alteration in the production of toxic factors and also
  // neurotrophic factors.
  // Adding to the microglial/macrophage response to motor neuron degeneration, the adaptive immune system can likewise influence the disease process.
  // Exploring these motor neuron-immune interactions could lead to a better understanding in the physiopathology of ALS to find
  // new pathways to slow down motor neuron degeneration.
  // This model will be hosted on BioModels Database and identified by: MODEL-to-be-done .
  // To cite BioModels Database, please use: BioModels Database: An enhanced, curated and annotated resource for published quantitative kinetic models .
  // To the extent possible under law, all copyright and related or neighbouring rights to this encoded model have been dedicated to the public domain worldwide. Please refer to CC0 Public Domain Dedication for more information.

  // Compartments:
  compartment CentralNervousSystem = 1;
  compartment Extracellular_space = 0.2;
  compartment Capillaries = 0.0055;
  compartment Veins = 0.0237;

  // Species:
  // Surviving lower motor neurons
  // The efferent fiber carries nerve impulses away from the the spinal cord, and toward the muscles.
  species $LivingLowerMotoNeurons in CentralNervousSystem = 999999;
  // Dead lower motor neurons
  // The efferent fiber carries nerve impulses away from the the spinal cord, and toward the muscles.
  species $DeadLowerMotoNeurons in CentralNervousSystem = 1;
  // * In a healthy situation the presynaptic neuron releases glutamate (Glu), which binds to
  // glutamate receptors (GluRs) on the postsynaptic motor neuron, resulting in excitation through
  // calcium influx.
  // Extracellular glutamate is quickly cleared from the synaptic cleft by astrocytes through EAAT2 transporters.
  // * In an ALS situation decreased expression of astrocytic glutamate
  // transporters EAAT2 could lead to prolonged glutamate excitation of motor neurons and
  // participate in their degeneration (excitotoxic hypothesis)
  species $EAAT2Transporters in CentralNervousSystem = 200000;
  // Proliferating astroglia
  species $Pro_Inflammatory_Astroglia in CentralNervousSystem = 50;
  // Normal microglia
  species $Anti_Inflammatory_Microglia in CentralNervousSystem = 200;
  // Reactive microglia
  species $Pro_Inflammatory_Microglia in CentralNervousSystem = 50;
  // CD4 T_Lymphocytes generated mostly because of dying neurons.
  species $CD4_T_Lymphocytes in CentralNervousSystem = 0;
  // CD8 T_Lymphocytes generated mostly because of dying neurons.
  species $CD8_T_Lymphocytes in CentralNervousSystem = 0;
  // Toxic Factors generated by Astroglia: Macrophage Colony Stimulating Factor (M-CSF) increase microglial cells proliferation.
  species $M_CSF_TxcFctr_Astroglia in CentralNervousSystem = 0;
  // Toxic Factors generated by Astroglia: Monocyte Chemoattractant Protein-1(MCP-1) increase microglial cells migration.
  species $MCP_1_TxcFctr_Astroglia in CentralNervousSystem = 0;
  // Toxic Factors generated by Microglia: Microglial cells self-activation.
  species $TNFalpha_TxcFctr_Microglia in CentralNervousSystem = 0;
  // Toxic Factors generated by Microglia: Reactive Oxygen Species (ROS) like nitric oxide (NO) through the inducible NO synthase.
  species $ROS_NO_TxcFctr_Microglia in CentralNervousSystem = 0;
  // Toxic Factors generated by Microglia: Reactive Oxygen Species (ROS) like Superoxide (O2-), is generated by the immune system to kill invading microorganisms, through activation of NADPH oxidases.
  species $ROS_O2_TxcFctr_Microglia in CentralNervousSystem = 0;
  // Toxic Factors generated by Microglia includes the proinflammatory cytokine interleukin-1β (IL-1β).
  species $IL1b_TxcFctr_Microglia in CentralNervousSystem = 0;
  // Toxic Factors generated by Microglia.
  species $IL6_TxcFctr_Microglia in CentralNervousSystem = 0;
  // Toxic Factors generated by Microglia. COX-2 is unexpressed under normal conditions in most cells, but elevated levels are found during inflammation.
  // depletion of TDP43 in microglia, but not in astrocytes, strikingly upregulates cyclooxygenase-2 (COX-2) expression and prostaglandin E2 (PGE2) production through the activation of MAPK/ERK signaling and initiates neurotoxicity.
  species $COX2_TxcFctr_Microglia in CentralNervousSystem = 0;
  // Toxic Factors generated by Microglia. Prostaglandin E2 (PGE2) activity can be associated with motor neuron death by inducing free radical formation and glutamate release from astrocytes.
  // depletion of TDP43 in microglia, but not in astrocytes, strikingly upregulates cyclooxygenase-2 (COX-2) expression and prostaglandin E2 (PGE2) production through the activation of MAPK/ERK signaling and initiates neurotoxicity.
  species $PEG2_TxcFctr_Microglia in CentralNervousSystem = 0;
  // Depletion of microglial TDP43 results in enhanced synapse loss and promotes amyloid clearance in a mouse model of AD. DOI https://doi.org/10.1016/j.neuron.2017.05.037
  // Depletion of TDP43 in microglia, but not in astrocytes, strikingly upregulates cyclooxygenase-2 (COX-2) expression and prostaglandin E2 (PGE2) production through the activation of MAPK/ERK signaling and initiates neurotoxicity.
  species $TDP43_TxcFctr_Microglia in CentralNervousSystem = 0;
  // For future reference.
  // Depletion of TDP43 in microglia, but not in astrocytes, strikingly upregulates cyclooxygenase-2 (COX-2) expression and prostaglandin E2 (PGE2) production through the activation of MAPK/ERK signaling and initiates neurotoxicity.
  species $TDP43_TxcFctr_Astroglia in CentralNervousSystem = 0;
  // Toxic Factors generated by Microglia: Reactive Oxygen Species (ROS) like Superoxide (O2-), is generated by the immune system to kill invading microorganisms, through activation of NADPH oxidases.
  species $ExtraCell_ATP_Microglia in CentralNervousSystem = 999999;
  // Toxic Factors generated by Astroglia, PGE2 and ROS.
  species $Other_TxcFctrs_Astroglia in CentralNervousSystem = 0;
  // Toxic Factors generated by Microglia, THF-α and IL-8.
  species $THF_IL8_TxcFctrs_Microglia in CentralNervousSystem = 0;
  // Toxic Factors generated by Microglia, PGE2, IL-x, TNF, ROS and NO.
  species $Other_TxcFctrs_Microglia in CentralNervousSystem = 0;
  // Active neutrophils arrive in response to the pro-inflammatory mediator and die naturally.
  species Active_neutrophils in CentralNervousSystem = 0;
  // Apoptotic neutrophils can break down spilling their toxic load (such as reactive oxygen species), damaging tissue.
  species Apoptotic_neutrophils in CentralNervousSystem = 0;

  // Parameters:
  NbOfNeurons = 1000000; NbOfNeurons is "Nb of neurons";
  NbOfMicroglia = 100000; NbOfMicroglia is "Nb of microglia";
  NbOfTDP43Neurons = 100000; NbOfTDP43Neurons is "Nb of TDP43 in microglia";
  NbOfTDP43Microglia = 100000; NbOfTDP43Microglia is "Nb of TDP43 in microglia";
  NbOfTDP43Astroglia = 100000; NbOfTDP43Astroglia is "Nb of TDP43 in Astroglia";
  NbOfAstrocytes = 200000; NbOfAstrocytes is "Nb of astrocytes";
  //           Extracellular ATP, likely coming from damaged motor neurons, binds to microglial purinergic P2 receptors,
  //                     therefore, contributing to microglial activation
  prmExtraCellATPDeadNeurons = 1;
  //           Pro Inflammatory Astroglia
  prmCD4TLymphToDeadNeuron = 0.55;
  //           Pro Inflammatory Microglia
  prmCD8TLymphToDeadNeuron = 0.55;
  //           Anti Inflammatory Microglia
  prmAntiInflamMicroglia = 1;
  //           Pro Inflammatory Microglia
  prmProInflamMicroglia = 1;
  //           Quiescent astroglia
  prmNonInflamAstroglia = 1;
  //           Toxic output from astroglia
  prmTxcAstroglia = 16;
  //           Toxic output from microglia
  prmTxcMicroglia = 1;
  //           Toxic output from microglia
  prmCycloOxygenase2 = 1;
  //           Controls the production of CD4 T_Lymphocytes in a dependency with the number of dying neurons
  prmCD4Lymphocytes = 0.5;
  //           Controls the production of CD8 T_Lymphocytes in a dependency with the number of dying neurons
  prmCD8Lymphocytes = 0.5;
  //           Controls the production of COX-2
  prmCOX2_TxcFctr = 0.5;
  //           Controls the production of PEG-2
  prmPEG2_TxcFctr = 0.5;
  //           Controls the production of PEG-2
  prmTDP43_TxcFctr = 0.5;

  // Rate rules:
  DeadLowerMotoNeurons' = piecewise(NbOfNeurons*(prmCD4TLymphToDeadNeuron*CD4_T_Lymphocytes + prmCD8TLymphToDeadNeuron*CD8_T_Lymphocytes)/(NbOfAstrocytes + NbOfMicroglia), LivingLowerMotoNeurons > 0, 0);
  LivingLowerMotoNeurons' = piecewise(-DeadLowerMotoNeurons, LivingLowerMotoNeurons > 0, 0);
  EAAT2Transporters' = piecewise(prmProInflamMicroglia*Pro_Inflammatory_Microglia/NbOfMicroglia - prmAntiInflamMicroglia*Anti_Inflammatory_Microglia/NbOfMicroglia, LivingLowerMotoNeurons > 0, 0);
  Pro_Inflammatory_Astroglia' = piecewise(DeadLowerMotoNeurons, LivingLowerMotoNeurons > 0, 0);
  Pro_Inflammatory_Microglia' = piecewise(M_CSF_TxcFctr_Astroglia + MCP_1_TxcFctr_Astroglia + TNFalpha_TxcFctr_Microglia + ROS_NO_TxcFctr_Microglia + ROS_O2_TxcFctr_Microglia + IL1b_TxcFctr_Microglia + IL6_TxcFctr_Microglia + COX2_TxcFctr_Microglia + PEG2_TxcFctr_Microglia + TDP43_TxcFctr_Microglia + ExtraCell_ATP_Microglia + DeadLowerMotoNeurons, LivingLowerMotoNeurons > 0, 0);
  ExtraCell_ATP_Microglia' = piecewise(prmExtraCellATPDeadNeurons - DeadLowerMotoNeurons, LivingLowerMotoNeurons > 0, 0);
  Anti_Inflammatory_Microglia' = piecewise(-EAAT2Transporters/NbOfAstrocytes, LivingLowerMotoNeurons > 0, 0);
  CD4_T_Lymphocytes' = piecewise(prmCD4Lymphocytes*MCP_1_TxcFctr_Astroglia, LivingLowerMotoNeurons > 0, 0);
  CD8_T_Lymphocytes' = piecewise(prmCD8Lymphocytes*MCP_1_TxcFctr_Astroglia, LivingLowerMotoNeurons > 0, 0);
  M_CSF_TxcFctr_Astroglia' = piecewise(prmTxcAstroglia*Pro_Inflammatory_Astroglia/NbOfAstrocytes, LivingLowerMotoNeurons > 0, 0);
  MCP_1_TxcFctr_Astroglia' = piecewise(prmTxcAstroglia*Pro_Inflammatory_Astroglia/NbOfAstrocytes, LivingLowerMotoNeurons > 0, 0);
  TNFalpha_TxcFctr_Microglia' = piecewise(prmTxcMicroglia*Pro_Inflammatory_Microglia/NbOfMicroglia, LivingLowerMotoNeurons > 0, 0);
  ROS_NO_TxcFctr_Microglia' = piecewise(prmTxcMicroglia*Pro_Inflammatory_Microglia/NbOfMicroglia, LivingLowerMotoNeurons > 0, 0);
  ROS_O2_TxcFctr_Microglia' = piecewise(prmTxcMicroglia*Pro_Inflammatory_Microglia/NbOfMicroglia, LivingLowerMotoNeurons > 0, 0);
  IL1b_TxcFctr_Microglia' = piecewise(prmTxcMicroglia*Pro_Inflammatory_Microglia/NbOfMicroglia, LivingLowerMotoNeurons > 0, 0);
  IL6_TxcFctr_Microglia' = piecewise(prmTxcMicroglia*Pro_Inflammatory_Microglia/NbOfMicroglia, LivingLowerMotoNeurons > 0, 0);
  COX2_TxcFctr_Microglia' = piecewise(prmCOX2_TxcFctr*(NbOfTDP43Neurons - TDP43_TxcFctr_Microglia), LivingLowerMotoNeurons > 0, 0);
  PEG2_TxcFctr_Microglia' = piecewise(prmPEG2_TxcFctr*(NbOfTDP43Neurons - TDP43_TxcFctr_Microglia), LivingLowerMotoNeurons > 0, 0);
  TDP43_TxcFctr_Microglia' = piecewise(prmTDP43_TxcFctr*Anti_Inflammatory_Microglia/NbOfMicroglia, LivingLowerMotoNeurons > 0, 0);

  // Unit definitions:
  unit volume = 1e-3 litre;
  unit time = second;
  unit substance = dimensionless;
end
