// SBML level 2 version 4

model MODEL_to_be_done()
  // JPLeRouzic2018 - Interaction between astrocytes and neurons in Amyotrophic lateral sclerosis (ALS)
  // JPLeRouzic2018 - Interactions between astrocytes and neurons in Amyotrophic lateral sclerosis (ALS)
  // Encoded non-curated model. Issues:
  // To be done
  // This model is described in the article:
  // Motor neuron-immune interactions: The vicious circle of ALS.
  // Barbeito AG, Mesci P, Boillée S.
  // J Neural Transm (Vienna). 2010 Aug;117(8):981-1000.
  // Abstract:
  // Motor information travels from the brain down the spinal cord via descending spinal cord tracts.
  // Descending tracts involve two neurons: the upper motor neuron (UMN) and lower motor neuron (LMN).
  // A nerve signal travels down the upper motor neuron until it synapses with the lower motor neuron in the spinal cord. Then, the lower motor neuron conducts the nerve signal to the spinal root where efferent nerve fibers carry the motor signal toward the target muscle. Because microglial cells, the resident macrophages of the CNS, react to any lesion of the nervous system,
  // they have for long been regarded as potential players in the pathogenesis of several neurodegenerative disorders including amyotrophic lateral sclerosis,
  // the most common motor neuron disease in the adult.
  // In recent years, this microglial reaction to motor neuron injury, in particular, and the innate immune response, in general,
  // has been implicated in the progression of the disease, in mouse models of ALS.
  // The mechanisms by which microglial cells influence motor neuron death in ALS are still largely unknown.
  // Microglial activation increases over the course of the disease and is associated with an alteration in the production of toxic factors and also
  // neurotrophic factors.
  // Adding to the microglial/macrophage response to motor neuron degeneration, the adaptive immune system can likewise influence the disease process.
  // Exploring these motor neuron-immune interactions could lead to a better understanding in the physiopathology of ALS to find
  // new pathways to slow down motor neuron degeneration.
  // This model will be hosted on BioModels Database and identified by: MODEL-to-be-done .
  // To cite BioModels Database, please use: BioModels Database: An enhanced, curated and annotated resource for published quantitative kinetic models .
  // To the extent possible under law, all copyright and related or neighbouring rights to this encoded model have been dedicated to the public domain worldwide. Please refer to CC0 Public Domain Dedication for more information.

  // Compartments:
  compartment SpinalCord_C1 = 1;
  compartment SpinalCord_C2 = 1;
  compartment SpinalCord_C3 = 1;
  compartment SpinalCord_C4 = 1;
  compartment SpinalCord_C5 = 1;
  compartment SpinalCord_C6 = 1;
  compartment SpinalCord_C7 = 1;
  compartment SpinalCord_C8 = 1;
  compartment SpinalCord_TH1 = 1;
  compartment SpinalCord_TH2 = 1;
  compartment SpinalCord_TH3 = 1;
  compartment SpinalCord_TH4 = 1;
  compartment SpinalCord_TH5 = 1;
  compartment SpinalCord_TH6 = 1;
  compartment SpinalCord_TH7 = 1;
  compartment SpinalCord_TH8 = 1;
  compartment SpinalCord_TH9 = 1;
  compartment SpinalCord_TH10 = 1;
  compartment SpinalCord_TH11 = 1;
  compartment SpinalCord_TH12 = 1;
  compartment SpinalCord_L1 = 1;
  compartment SpinalCord_L2 = 1;
  compartment SpinalCord_L3 = 1;
  compartment SpinalCord_L4 = 1;
  compartment SpinalCord_L5 = 1;
  compartment SpinalCord_S1 = 1;
  compartment SpinalCord_S2 = 1;
  compartment SpinalCord_S3 = 1;
  compartment SpinalCord_S4 = 1;
  compartment SpinalCord_S5 = 1;
  compartment AGenericNerve = 1;
  compartment Extracellular_space = 0.2;
  compartment Capillaries = 0.0055;
  compartment Veins = 0.0237;

  // Species:
  species $LivingMotoNeurons_C1 in SpinalCord_C1 = 999999;
  species $DeadMotoNeurons_C1 in SpinalCord_C1 = 1;
  species $Pro_Inflammatory_Microglia_C1 in SpinalCord_C1 = 1;
  species $LivingMotoNeurons_C2 in SpinalCord_C2 = 999999;
  species $DeadMotoNeurons_C2 in SpinalCord_C2 = 1;
  species $Pro_Inflammatory_Microglia_C2 in SpinalCord_C1 = 1;
  species $LivingMotoNeurons_C3 in SpinalCord_C3 = 999999;
  species $DeadMotoNeurons_C3 in SpinalCord_C3 = 1;
  species $Pro_Inflammatory_Microglia_C3 in SpinalCord_C1 = 1;
  species $LivingMotoNeurons_C4 in SpinalCord_C4 = 999999;
  species $DeadMotoNeurons_C4 in SpinalCord_C4 = 1;
  species $Pro_Inflammatory_Microglia_C4 in SpinalCord_C1 = 1;
  species $LivingMotoNeurons_C5 in SpinalCord_C5 = 999999;
  species $DeadMotoNeurons_C5 in SpinalCord_C5 = 1;
  species $Pro_Inflammatory_Microglia_C5 in SpinalCord_C1 = 1;
  species $LivingMotoNeurons_C6 in SpinalCord_C6 = 999999;
  species $DeadMotoNeurons_C6 in SpinalCord_C6 = 1;
  species $Pro_Inflammatory_Microglia_C6 in SpinalCord_C1 = 1;
  species $LivingMotoNeurons_C7 in SpinalCord_C7 = 999999;
  species $DeadMotoNeurons_C7 in SpinalCord_C7 = 1;
  species $Pro_Inflammatory_Microglia_C7 in SpinalCord_C1 = 1;
  species $LivingMotoNeurons_C8 in SpinalCord_C8 = 999999;
  species $DeadMotoNeurons_C8 in SpinalCord_C8 = 1;
  species $Pro_Inflammatory_Microglia_C8 in SpinalCord_C1 = 1;
  species $LivingMotoNeurons_TH1 in SpinalCord_TH1 = 999999;
  species $DeadMotoNeurons_TH1 in SpinalCord_TH1 = 1;
  species $Pro_Inflammatory_Microglia_TH1 in SpinalCord_C1 = 1;
  species $LivingMotoNeurons_TH2 in SpinalCord_TH2 = 999999;
  species $DeadMotoNeurons_TH2 in SpinalCord_TH2 = 1;
  species $Pro_Inflammatory_Microglia_TH2 in SpinalCord_C1 = 1;
  species $LivingMotoNeurons_TH3 in SpinalCord_TH3 = 999999;
  species $DeadMotoNeurons_TH3 in SpinalCord_TH3 = 1;
  species $Pro_Inflammatory_Microglia_TH3 in SpinalCord_C1 = 1;
  species $LivingMotoNeurons_TH4 in SpinalCord_TH4 = 999999;
  species $DeadMotoNeurons_TH4 in SpinalCord_TH4 = 1;
  species $Pro_Inflammatory_Microglia_TH4 in SpinalCord_C1 = 1;
  species $LivingMotoNeurons_TH5 in SpinalCord_TH5 = 999999;
  species $DeadMotoNeurons_TH5 in SpinalCord_TH5 = 1;
  species $Pro_Inflammatory_Microglia_TH5 in SpinalCord_C1 = 1;
  species $LivingMotoNeurons_TH6 in SpinalCord_TH6 = 999999;
  species $DeadMotoNeurons_TH6 in SpinalCord_TH6 = 1;
  species $Pro_Inflammatory_Microglia_TH6 in SpinalCord_C1 = 1;
  species $LivingMotoNeurons_TH7 in SpinalCord_TH7 = 999999;
  species $DeadMotoNeurons_TH7 in SpinalCord_TH7 = 1;
  species $Pro_Inflammatory_Microglia_TH7 in SpinalCord_C1 = 1;
  species $LivingMotoNeurons_TH8 in SpinalCord_TH8 = 999999;
  species $DeadMotoNeurons_TH8 in SpinalCord_TH8 = 1;
  species $Pro_Inflammatory_Microglia_TH8 in SpinalCord_C1 = 1;
  species $LivingMotoNeurons_TH9 in SpinalCord_TH9 = 999999;
  species $DeadMotoNeurons_TH9 in SpinalCord_TH9 = 1;
  species $Pro_Inflammatory_Microglia_TH9 in SpinalCord_C1 = 1;
  species $LivingMotoNeurons_TH10 in SpinalCord_TH10 = 999999;
  species $DeadMotoNeurons_TH10 in SpinalCord_TH10 = 1;
  species $Pro_Inflammatory_Microglia_TH10 in SpinalCord_C1 = 1;
  species $LivingMotoNeurons_TH11 in SpinalCord_TH11 = 999999;
  species $DeadMotoNeurons_TH11 in SpinalCord_TH11 = 1;
  species $Pro_Inflammatory_Microglia_TH11 in SpinalCord_C1 = 1;
  species $LivingMotoNeurons_TH12 in SpinalCord_TH12 = 999999;
  species $DeadMotoNeurons_TH12 in SpinalCord_TH12 = 1;
  species $Pro_Inflammatory_Microglia_TH12 in SpinalCord_C1 = 1;
  species $LivingMotoNeurons_L1 in SpinalCord_L1 = 999999;
  species $DeadMotoNeurons_L1 in SpinalCord_L1 = 1;
  species $Pro_Inflammatory_Microglia_L1 in SpinalCord_C1 = 1;
  species $LivingMotoNeurons_L2 in SpinalCord_L2 = 999999;
  species $DeadMotoNeurons_L2 in SpinalCord_L2 = 1;
  species $Pro_Inflammatory_Microglia_L2 in SpinalCord_C1 = 1;
  species $LivingMotoNeurons_L3 in SpinalCord_L3 = 999999;
  species $DeadMotoNeurons_L3 in SpinalCord_L3 = 1;
  species $Pro_Inflammatory_Microglia_L3 in SpinalCord_C1 = 1;
  species $LivingMotoNeurons_L4 in SpinalCord_L4 = 999999;
  species $DeadMotoNeurons_L4 in SpinalCord_L4 = 1;
  species $Pro_Inflammatory_Microglia_L4 in SpinalCord_C1 = 1;
  species $LivingMotoNeurons_L5 in SpinalCord_L5 = 999999;
  species $DeadMotoNeurons_L5 in SpinalCord_L5 = 1;
  species $Pro_Inflammatory_Microglia_L5 in SpinalCord_C1 = 1;
  species $LivingMotoNeurons_S1 in SpinalCord_S1 = 999999;
  species $DeadMotoNeurons_S1 in SpinalCord_S1 = 1;
  species $Pro_Inflammatory_Microglia_S1 in SpinalCord_C1 = 1;
  species $LivingMotoNeurons_S2 in SpinalCord_S2 = 999999;
  species $DeadMotoNeurons_S2 in SpinalCord_S2 = 1;
  species $Pro_Inflammatory_Microglia_S2 in SpinalCord_C1 = 1;
  species $LivingMotoNeurons_S3 in SpinalCord_S3 = 999999;
  species $DeadMotoNeurons_S3 in SpinalCord_S3 = 1;
  species $Pro_Inflammatory_Microglia_S3 in SpinalCord_C1 = 1;
  species $LivingMotoNeurons_S4 in SpinalCord_S4 = 999999;
  species $DeadMotoNeurons_S4 in SpinalCord_S4 = 1;
  species $Pro_Inflammatory_Microglia_S4 in SpinalCord_C1 = 1;
  species $LivingMotoNeurons_S5 in SpinalCord_S5 = 999999;
  species $DeadMotoNeurons_S5 in SpinalCord_S5 = 1;
  species $Pro_Inflammatory_Microglia_S5 in SpinalCord_C1 = 1;
  // Surviving lower motor neurons
  // The efferent fiber carries nerve impulses away from the the spinal cord, and toward the muscles.
  species $LivingLowerMotoNeurons in AGenericNerve = 999999;
  // Dead lower motor neurons
  // The efferent fiber carries nerve impulses away from the the spinal cord, and toward the muscles.
  species $DeadLowerMotoNeurons in AGenericNerve = 1;
  // * In a healthy situation the presynaptic neuron releases glutamate (Glu), which binds to
  // glutamate receptors (GluRs) on the postsynaptic motor neuron, resulting in excitation through
  // calcium influx.
  // Extracellular glutamate is quickly cleared from the synaptic cleft by astrocytes through EAAT2 transporters.
  // * In an ALS situation decreased expression of astrocytic glutamate
  // transporters EAAT2 could lead to prolonged glutamate excitation of motor neurons and
  // participate in their degeneration (excitotoxic hypothesis)
  species $EAAT2Transporters in AGenericNerve = 200000;
  // Proliferating astroglia
  species $Pro_Inflammatory_Astroglia in AGenericNerve = 50;
  // Normal microglia
  species $Anti_Inflammatory_Microglia in AGenericNerve = 200;
  // Reactive microglia
  species $Pro_Inflammatory_Microglia in AGenericNerve = 50;
  // CD4 T_Lymphocytes generated mostly because of dying neurons.
  species $CD4_T_Lymphocytes in AGenericNerve = 0;
  // CD8 T_Lymphocytes generated mostly because of dying neurons.
  species $CD8_T_Lymphocytes in AGenericNerve = 0;
  // Toxic Factors generated by Astroglia: Macrophage Colony Stimulating Factor (M-CSF) increase microglial cells proliferation.
  species $M_CSF_TxcFctr_Astroglia in AGenericNerve = 0;
  // Toxic Factors generated by Astroglia: Monocyte Chemoattractant Protein-1(MCP-1) increase microglial cells migration.
  species $MCP_1_TxcFctr_Astroglia in AGenericNerve = 0;
  // Toxic Factors generated by Microglia: Microglial cells self-activation.
  species $TNFalpha_TxcFctr_Microglia in AGenericNerve = 0;
  // Toxic Factors generated by Microglia: Reactive Oxygen Species (ROS) like nitric oxide (NO) through the inducible NO synthase.
  species $ROS_NO_TxcFctr_Microglia in AGenericNerve = 0;
  // Toxic Factors generated by Microglia: Reactive Oxygen Species (ROS) like Superoxide (O2-), is generated by the immune system to kill invading microorganisms, through activation of NADPH oxidases.
  species $ROS_O2_TxcFctr_Microglia in AGenericNerve = 0;
  // Toxic Factors generated by Microglia includes the proinflammatory cytokine interleukin-1β (IL-1β).
  species $IL1b_TxcFctr_Microglia in AGenericNerve = 0;
  // Toxic Factors generated by Microglia.
  species $IL6_TxcFctr_Microglia in AGenericNerve = 0;
  // Toxic Factors generated by Microglia. COX-2 is unexpressed under normal conditions in most cells, but elevated levels are found during inflammation.
  // depletion of TDP43 in microglia, but not in astrocytes, strikingly upregulates cyclooxygenase-2 (COX-2) expression and prostaglandin E2 (PGE2) production through the activation of MAPK/ERK signaling and initiates neurotoxicity.
  species $COX2_TxcFctr_Microglia in AGenericNerve = 0;
  // Toxic Factors generated by Microglia. Prostaglandin E2 (PGE2) activity can be associated with motor neuron death by inducing free radical formation and glutamate release from astrocytes.
  // depletion of TDP43 in microglia, but not in astrocytes, strikingly upregulates cyclooxygenase-2 (COX-2) expression and prostaglandin E2 (PGE2) production through the activation of MAPK/ERK signaling and initiates neurotoxicity.
  species $PEG2_TxcFctr_Microglia in AGenericNerve = 0;
  // Depletion of microglial TDP43 results in enhanced synapse loss and promotes amyloid clearance in a mouse model of AD. DOI https://doi.org/10.1016/j.neuron.2017.05.037
  // Depletion of TDP43 in microglia, but not in astrocytes, strikingly upregulates cyclooxygenase-2 (COX-2) expression and prostaglandin E2 (PGE2) production through the activation of MAPK/ERK signaling and initiates neurotoxicity.
  species $TDP43_TxcFctr_Microglia in AGenericNerve = 0;
  // For future reference.
  // Depletion of TDP43 in microglia, but not in astrocytes, strikingly upregulates cyclooxygenase-2 (COX-2) expression and prostaglandin E2 (PGE2) production through the activation of MAPK/ERK signaling and initiates neurotoxicity.
  species $TDP43_TxcFctr_Astroglia in AGenericNerve = 0;
  // Toxic Factors generated by Microglia: Reactive Oxygen Species (ROS) like Superoxide (O2-), is generated by the immune system to kill invading microorganisms, through activation of NADPH oxidases.
  species $ExtraCell_ATP_Microglia in AGenericNerve = 0;
  // Toxic Factors generated by Astroglia, PGE2 and ROS.
  species $Other_TxcFctrs_Astroglia in AGenericNerve = 0;
  // Toxic Factors generated by Microglia, PGE2, IL-x, TNF, ROS and NO.
  species $Other_TxcFctrs_Microglia in AGenericNerve = 0;

  // Parameters:
  NbOfNeurons = 1000000; NbOfNeurons is "Nb of neurons";
  NbOfMicroglia = 100000; NbOfMicroglia is "Nb of microglia";
  NbOfTDP43Neurons = 100000; NbOfTDP43Neurons is "Nb of TDP43 in microglia";
  NbOfTDP43Microglia = 100000; NbOfTDP43Microglia is "Nb of TDP43 in microglia";
  NbOfTDP43Astroglia = 100000; NbOfTDP43Astroglia is "Nb of TDP43 in Astroglia";
  NbOfAstrocytes = 200000; NbOfAstrocytes is "Nb of astrocytes";
  // 		 Extracellular ATP, likely coming from damaged motor neurons, binds to microglial purinergic P2 receptors,
  // 		 therefore, contributing to microglial activation
  prmExtraCellATPDeadNeurons = 1;
  // 		 Pro Inflammatory Astroglia
  prmCD4TLymphToDeadNeuron = 0.55;
  // 		 Pro Inflammatory Microglia
  prmCD8TLymphToDeadNeuron = 0.55;
  // 		 Anti Inflammatory Microglia
  prmAntiInflamMicroglia = 1;
  // 		 Pro Inflammatory Microglia
  prmProInflamMicroglia = 1;
  // 		 Pro Inflammatory Microglia
  prmSpineInflamMicroglia = 0.001;
  // 		 Quiescent astroglia
  prmNonInflamAstroglia = 1;
  // 		 Toxic output from astroglia
  prmTxcAstroglia = 16;
  // 		 Toxic output from microglia
  prmTxcMicroglia = 1;
  // 		 Toxic output from microglia
  prmCycloOxygenase2 = 1;
  // 		 Controls the production of CD4 T_Lymphocytes in a dependency with the number of dying neurons
  prmCD4Lymphocytes = 0.5;
  // 		 Controls the production of CD8 T_Lymphocytes in a dependency with the number of dying neurons
  prmCD8Lymphocytes = 0.5;
  // 		 Controls the production of COX-2
  prmCOX2_TxcFctr = 0.5;
  // 		 Controls the production of PEG-2
  prmPEG2_TxcFctr = 0.5;
  // 		 Controls the production of PEG-2
  prmTDP43_TxcFctr = 0.5;

  // Rate rules:
  LivingMotoNeurons_C1' = -Pro_Inflammatory_Microglia_C1;
  Pro_Inflammatory_Microglia_C1' = DeadLowerMotoNeurons;
  LivingMotoNeurons_C2' = -Pro_Inflammatory_Microglia_C2;
  Pro_Inflammatory_Microglia_C2' = Pro_Inflammatory_Microglia_C1;
  LivingMotoNeurons_C3' = -Pro_Inflammatory_Microglia_C3;
  Pro_Inflammatory_Microglia_C3' = Pro_Inflammatory_Microglia_C2;
  LivingMotoNeurons_C4' = -Pro_Inflammatory_Microglia_C4;
  Pro_Inflammatory_Microglia_C4' = Pro_Inflammatory_Microglia_C3;
  LivingMotoNeurons_C5' = -Pro_Inflammatory_Microglia_C5;
  Pro_Inflammatory_Microglia_C5' = Pro_Inflammatory_Microglia_C4;
  LivingMotoNeurons_C6' = -Pro_Inflammatory_Microglia_C6;
  Pro_Inflammatory_Microglia_C6' = Pro_Inflammatory_Microglia_C5;
  LivingMotoNeurons_C7' = -Pro_Inflammatory_Microglia_C7;
  Pro_Inflammatory_Microglia_C7' = Pro_Inflammatory_Microglia_C6;
  LivingMotoNeurons_C8' = -Pro_Inflammatory_Microglia_C8;
  Pro_Inflammatory_Microglia_C8' = Pro_Inflammatory_Microglia_C7;
  LivingMotoNeurons_TH1' = -Pro_Inflammatory_Microglia_TH1;
  Pro_Inflammatory_Microglia_TH1' = Pro_Inflammatory_Microglia_C8;
  LivingMotoNeurons_TH2' = -Pro_Inflammatory_Microglia_TH2;
  Pro_Inflammatory_Microglia_TH2' = Pro_Inflammatory_Microglia_TH1;
  LivingMotoNeurons_TH3' = -Pro_Inflammatory_Microglia_TH3;
  Pro_Inflammatory_Microglia_TH3' = Pro_Inflammatory_Microglia_TH2;
  LivingMotoNeurons_TH4' = -Pro_Inflammatory_Microglia_TH4;
  Pro_Inflammatory_Microglia_TH4' = Pro_Inflammatory_Microglia_TH3;
  LivingMotoNeurons_TH5' = -Pro_Inflammatory_Microglia_TH5;
  Pro_Inflammatory_Microglia_TH5' = Pro_Inflammatory_Microglia_TH4;
  LivingMotoNeurons_TH6' = -Pro_Inflammatory_Microglia_TH6;
  Pro_Inflammatory_Microglia_TH6' = Pro_Inflammatory_Microglia_TH5;
  LivingMotoNeurons_TH7' = -Pro_Inflammatory_Microglia_TH7;
  Pro_Inflammatory_Microglia_TH7' = Pro_Inflammatory_Microglia_TH6;
  LivingMotoNeurons_TH8' = -Pro_Inflammatory_Microglia_TH8;
  Pro_Inflammatory_Microglia_TH8' = Pro_Inflammatory_Microglia_TH7;
  LivingMotoNeurons_TH9' = -Pro_Inflammatory_Microglia_TH9;
  Pro_Inflammatory_Microglia_TH9' = Pro_Inflammatory_Microglia_TH8;
  LivingMotoNeurons_TH10' = -Pro_Inflammatory_Microglia_TH10;
  Pro_Inflammatory_Microglia_TH10' = Pro_Inflammatory_Microglia_TH9;
  LivingMotoNeurons_TH11' = -Pro_Inflammatory_Microglia_TH11;
  Pro_Inflammatory_Microglia_TH11' = Pro_Inflammatory_Microglia_TH10;
  LivingMotoNeurons_TH12' = -Pro_Inflammatory_Microglia_TH12;
  Pro_Inflammatory_Microglia_TH12' = Pro_Inflammatory_Microglia_TH11;
  LivingMotoNeurons_L1' = -Pro_Inflammatory_Microglia_L1;
  Pro_Inflammatory_Microglia_L1' = Pro_Inflammatory_Microglia_TH12;
  LivingMotoNeurons_L2' = -Pro_Inflammatory_Microglia_L2;
  Pro_Inflammatory_Microglia_L2' = Pro_Inflammatory_Microglia_L1;
  LivingMotoNeurons_L3' = -Pro_Inflammatory_Microglia_L3;
  Pro_Inflammatory_Microglia_L3' = Pro_Inflammatory_Microglia_L2;
  LivingMotoNeurons_L4' = -Pro_Inflammatory_Microglia_L4;
  Pro_Inflammatory_Microglia_L4' = Pro_Inflammatory_Microglia_L3;
  LivingMotoNeurons_L5' = -Pro_Inflammatory_Microglia_L5;
  Pro_Inflammatory_Microglia_L5' = Pro_Inflammatory_Microglia_L4;
  LivingMotoNeurons_S1' = -Pro_Inflammatory_Microglia_S1;
  Pro_Inflammatory_Microglia_S1' = Pro_Inflammatory_Microglia_L5;
  LivingMotoNeurons_S2' = -Pro_Inflammatory_Microglia_S2;
  Pro_Inflammatory_Microglia_S2' = Pro_Inflammatory_Microglia_S1;
  LivingMotoNeurons_S3' = -Pro_Inflammatory_Microglia_S3;
  Pro_Inflammatory_Microglia_S3' = Pro_Inflammatory_Microglia_S2;
  LivingMotoNeurons_S4' = -Pro_Inflammatory_Microglia_S4;
  Pro_Inflammatory_Microglia_S4' = Pro_Inflammatory_Microglia_S3;
  LivingMotoNeurons_S5' = -Pro_Inflammatory_Microglia_S5;
  Pro_Inflammatory_Microglia_S5' = Pro_Inflammatory_Microglia_S4;
  DeadLowerMotoNeurons' = NbOfNeurons*((prmCD4TLymphToDeadNeuron*CD4_T_Lymphocytes + prmCD8TLymphToDeadNeuron*CD8_T_Lymphocytes)/(NbOfAstrocytes + NbOfMicroglia));
  LivingLowerMotoNeurons' = -DeadLowerMotoNeurons;
  EAAT2Transporters' = prmProInflamMicroglia*(Pro_Inflammatory_Microglia/NbOfMicroglia) - prmAntiInflamMicroglia*(Anti_Inflammatory_Microglia/NbOfMicroglia);
  Pro_Inflammatory_Astroglia' = DeadLowerMotoNeurons;
  Pro_Inflammatory_Microglia' = M_CSF_TxcFctr_Astroglia + MCP_1_TxcFctr_Astroglia + TNFalpha_TxcFctr_Microglia + ROS_NO_TxcFctr_Microglia + ROS_O2_TxcFctr_Microglia + IL1b_TxcFctr_Microglia + IL6_TxcFctr_Microglia + COX2_TxcFctr_Microglia + PEG2_TxcFctr_Microglia + TDP43_TxcFctr_Microglia + ExtraCell_ATP_Microglia + DeadLowerMotoNeurons;
  ExtraCell_ATP_Microglia' = prmExtraCellATPDeadNeurons - DeadLowerMotoNeurons;
  Anti_Inflammatory_Microglia' = -(EAAT2Transporters/NbOfAstrocytes);
  CD4_T_Lymphocytes' = prmCD4Lymphocytes*MCP_1_TxcFctr_Astroglia;
  CD8_T_Lymphocytes' = prmCD8Lymphocytes*MCP_1_TxcFctr_Astroglia;
  M_CSF_TxcFctr_Astroglia' = prmTxcAstroglia*(Pro_Inflammatory_Astroglia/NbOfAstrocytes);
  MCP_1_TxcFctr_Astroglia' = prmTxcAstroglia*(Pro_Inflammatory_Astroglia/NbOfAstrocytes);
  TNFalpha_TxcFctr_Microglia' = prmTxcMicroglia*(Pro_Inflammatory_Microglia/NbOfMicroglia);
  ROS_NO_TxcFctr_Microglia' = prmTxcMicroglia*(Pro_Inflammatory_Microglia/NbOfMicroglia);
  ROS_O2_TxcFctr_Microglia' = prmTxcMicroglia*(Pro_Inflammatory_Microglia/NbOfMicroglia);
  IL1b_TxcFctr_Microglia' = prmTxcMicroglia*(Pro_Inflammatory_Microglia/NbOfMicroglia);
  IL6_TxcFctr_Microglia' = prmTxcMicroglia*(Pro_Inflammatory_Microglia/NbOfMicroglia);
  COX2_TxcFctr_Microglia' = prmCOX2_TxcFctr*(NbOfTDP43Microglia - TDP43_TxcFctr_Microglia);
  PEG2_TxcFctr_Microglia' = prmPEG2_TxcFctr*(NbOfTDP43Microglia - TDP43_TxcFctr_Microglia);
  TDP43_TxcFctr_Microglia' = prmTDP43_TxcFctr*(Anti_Inflammatory_Microglia/NbOfMicroglia);

  // Unit definitions:
  unit volume = 1e-3 litre;
  unit time = second;
  unit substance = dimensionless;
end
