// SBML level 2 version 4

model MODEL_to_be_done()
  // JPLeRouzic2018 - Interaction between astrocytes and neurons in Amyotrophic lateral sclerosis (ALS)
  // JPLeRouzic2018 - Interactions between astrocytes and neurons in Amyotrophic lateral sclerosis (ALS)
  // Encoded non-curated model. Issues:
  // To be done
  // This model is described in the article:
  // Motor neuron-immune interactions: The vicious circle of ALS.
  // Barbeito AG, Mesci P, Boillée S.
  // J Neural Transm (Vienna). 2010 Aug;117(8):981-1000.
  // Abstract:
  // Because microglial cells, the resident macrophages of the CNS, react to any lesion of the nervous system,
  // they have for long been regarded as potential players in the pathogenesis of several neurodegenerative disorders including amyotrophic lateral sclerosis,
  // the most common motor neuron disease in the adult.
  // In recent years, this microglial reaction to motor neuron injury, in particular, and the innate immune response, in general,
  // has been implicated in the progression of the disease, in mouse models of ALS.
  // The mechanisms by which microglial cells influence motor neuron death in ALS are still largely unknown.
  // Microglial activation increases over the course of the disease and is associated with an alteration in the production of toxic factors and also
  // neurotrophic factors.
  // Adding to the microglial/macrophage response to motor neuron degeneration, the adaptive immune system can likewise influence the disease process.
  // Exploring these motor neuron-immune interactions could lead to a better understanding in the physiopathology of ALS to find
  // new pathways to slow down motor neuron degeneration.
  // This model will be hosted on BioModels Database and identified by: MODEL-to-be-done .
  // To cite BioModels Database, please use: BioModels Database: An enhanced, curated and annotated resource for published quantitative kinetic models .
  // To the extent possible under law, all copyright and related or neighbouring rights to this encoded model have been dedicated to the public domain worldwide. Please refer to CC0 Public Domain Dedication for more information.

  // Compartments:
  compartment CentralNervousSystem = 1;
  compartment Extracellular_space = 0.2;
  compartment Capillaries = 0.0055;
  compartment Veins = 0.0237;

  // Species:
  // Pre-Synaptic Neurons
  species $PreSynapticNeurons in CentralNervousSystem = 999999;
  // Exocytosis
  species $Exocytosis in CentralNervousSystem = 999999;
  // Surviving neurons
  species $LivingMotoNeurons in CentralNervousSystem = 999999;
  // Dead neurons
  species $DeadMotoNeurons in CentralNervousSystem = 1;
  // Quiescent astroglia
  species $Quiescent_Astroglia in CentralNervousSystem = 200;
  // Proliferating astroglia
  species $Pro_Inflammatory_Astroglia in CentralNervousSystem = 50;
  // Normal microglia
  species $Anti_Inflammatory_Microglia in CentralNervousSystem = 200;
  // Reactive microglia
  species $Pro_Inflammatory_Microglia in CentralNervousSystem = 50;
  // Dentritic Cell
  species $DentriticCell in CentralNervousSystem = 1;
  // Cytokines
  species $Cytokines in CentralNervousSystem = 1;
  // Neuronal adenosine diphosphate
  species $ADPn in CentralNervousSystem;
  // Astrocytic adenosine diphosphate
  species $ADPg in CentralNervousSystem;
  // Neuronal adenosine triphosphate
  species $ATPn in CentralNervousSystem = 2.2;
  // Atrocytic adenosine triphosphate
  species $ATPg in CentralNervousSystem = 2.2;
  // Neuronal glucose
  species $GLCn in CentralNervousSystem = 1.2;
  // Astrocytic glucose
  species $GLCg in CentralNervousSystem = 1.2;

  // Parameters:
  //           Dead neurons
  a1 = 1;
  //           Living neurons
  a2 = 0.5;
  //           Pro Inflammatory Microglia
  a3 = 0;
  //           Anti Inflammatory Microglia
  a4 = 1;
  //           Pro Inflammatory Astroglia
  a5 = 1;
  //           Quiescent astroglia
  a7 = 0.5;
  NbOfNeurons = 1000000; NbOfNeurons is "Nb of neurons";
  NbOfMicroglia = 100000; NbOfMicroglia is "Nb of microglia";
  NbOfAstrocytes = 200000; NbOfAstrocytes is "Nb of astrocytes";
  qAK = 0.92;
  VnHK_PFK = 0.010376; VnHK_PFK is "VnHK-PFK";
  VnPGK = 0.02035946;
  VnPK = 0.02068607;
  VnATPases = 0.17;
  VnPump = 0.1595;
  nop = 15;
  VnMito = 0.010857;
  VnCK = -0.0005265668;
  dAMP_dATPn = -0.01168247; dAMP_dATPn is "dAMP-dATPn";
  VgHK_PFK = 0.004063933; VgHK_PFK is "VgHK-PFK";
  VgPGK = 0.007990026;
  VgPK = 0.008112186;
  VgATPases = 0.02;
  VgPump = 0.06202778;
  VgMito = 0.002584999;
  VgCK = -0.0002292204;
  dAMP_dATPg = -0.01168247; dAMP_dATPg is "dAMP-dATPg";
  A = 2.212;
  VenGLC = -1.451617e-13;
  VegGLC = -2.831069e-14;
  VcgGLC = 0.002033316;

  // Assignment rules:
  ADPn := ATPn/2*(-qAK + (qAK^2 + 4*qAK*(A/ATPn - 1))^(1/2));
  ADPg := ATPg/2*(-qAK + (qAK^2 + 4*qAK*(A/ATPg - 1))^(1/2));

  // Rate rules:
  DeadMotoNeurons' = NbOfNeurons*((a5*Pro_Inflammatory_Astroglia + a3*Pro_Inflammatory_Microglia)/(NbOfAstrocytes + NbOfMicroglia));
  LivingMotoNeurons' = -DeadMotoNeurons;
  Quiescent_Astroglia' = a4*Anti_Inflammatory_Microglia - a5*Pro_Inflammatory_Microglia;
  Pro_Inflammatory_Astroglia' = a3*Pro_Inflammatory_Microglia;
  Anti_Inflammatory_Microglia' = a2*Quiescent_Astroglia - a1*DeadMotoNeurons/10;
  Pro_Inflammatory_Microglia' = DeadMotoNeurons;
  ATPn' = (-2*VnHK_PFK + VnPGK + VnPK - VnATPases - VnPump + nop*VnMito + VnCK)*(1 - dAMP_dATPn)^(-1);
  ATPg' = (-2*VgHK_PFK + VgPGK + VgPK - VgATPases - VgPump + nop*VgMito + VgCK)*(1 - dAMP_dATPg)^(-1);
  GLCn' = VenGLC - VnHK_PFK;
  GLCg' = VcgGLC + VegGLC - VgHK_PFK;

  // Events:
  at (LivingMotoNeurons < 0): LivingMotoNeurons = 0;  // FloorReached
  at (LivingMotoNeurons >= 0): LivingMotoNeurons = a5*Pro_Inflammatory_Astroglia + a3*Pro_Inflammatory_Microglia;  // FloorNotReached

  // Unit definitions:
  unit volume = 1e-3 litre;
  unit time = 86400 second;
  unit substance = dimensionless;
end
