// SBML level 2 version 4

model MODEL_to_be_done()
  // JPLeRouzic2018 - Interaction between astrocytes and neurons in Amyotrophic lateral sclerosis (ALS)
  // JPLeRouzic2018 - Interactions between astrocytes and neurons in Amyotrophic lateral sclerosis (ALS)
  // Encoded non-curated model. Issues:
  // To be done
  // This model is described in the article:
  // Motor neuron-immune interactions: The vicious circle of ALS.
  // Barbeito AG, Mesci P, Boillée S.
  // J Neural Transm (Vienna). 2010 Aug;117(8):981-1000.
  // Abstract:
  // Because microglial cells, the resident macrophages of the CNS, react to any lesion of the nervous system,
  // they have for long been regarded as potential players in the pathogenesis of several neurodegenerative disorders including amyotrophic lateral sclerosis,
  // the most common motor neuron disease in the adult.
  // In recent years, this microglial reaction to motor neuron injury, in particular, and the innate immune response, in general,
  // has been implicated in the progression of the disease, in mouse models of ALS.
  // The mechanisms by which microglial cells influence motor neuron death in ALS are still largely unknown.
  // Microglial activation increases over the course of the disease and is associated with an alteration in the production of toxic factors and also
  // neurotrophic factors.
  // Adding to the microglial/macrophage response to motor neuron degeneration, the adaptive immune system can likewise influence the disease process.
  // Exploring these motor neuron-immune interactions could lead to a better understanding in the physiopathology of ALS to find
  // new pathways to slow down motor neuron degeneration.
  // This model will be hosted on BioModels Database and identified by: MODEL-to-be-done .
  // To cite BioModels Database, please use: BioModels Database: An enhanced, curated and annotated resource for published quantitative kinetic models .
  // To the extent possible under law, all copyright and related or neighbouring rights to this encoded model have been dedicated to the public domain worldwide. Please refer to CC0 Public Domain Dedication for more information.

  // Compartments:
  compartment CentralNervousSystem = 1;
  compartment Extracellular_space = 0.2;
  compartment Capillaries = 0.0055;
  compartment Veins = 0.0237;

  // Species:
  // Pre-Synaptic Neurons
  species $PreSynapticNeurons in CentralNervousSystem = 999999;
  // Exocytosis
  species $Exocytosis in CentralNervousSystem = 999999;
  // A motor unit is made up of a motor neuron and the skeletal muscle fibers innervated by that motor neuron's axonal terminals.
  // Groups of motor units often work together to coordinate the contractions of a single muscle.
  // All of the motor units within a muscle are considered a motor pool.
  species $BrokenMotorUnit in CentralNervousSystem = 1;
  // Surviving Upper neurons
  // Upper motor neurons are found in the brain and carry motor information down the spinal cord to activate the lower motor neurons,
  species $LivingUpperMotoNeurons in CentralNervousSystem = 999999;
  // Dead Upper neurons
  // Upper motor neurons are found in the brain and carry motor information down the spinal cord to activate the lower motor neurons,
  species $DeadUpperMotoNeurons in CentralNervousSystem = 1;
  // Surviving lower motor neurons
  // The efferent fiber carries nerve impulses away from the the spinal cord, and toward the muscles.
  species $LivingLowerMotoNeurons in CentralNervousSystem = 999999;
  // Dead lower motor neurons
  // The efferent fiber carries nerve impulses away from the the spinal cord, and toward the muscles.
  species $DeadLowerMotoNeurons in CentralNervousSystem = 1;
  // Quiescent astroglia
  species $Quiescent_Astroglia in CentralNervousSystem = 200;
  // Proliferating astroglia
  species $Pro_Inflammatory_Astroglia in CentralNervousSystem = 50;
  // Normal microglia
  species $Anti_Inflammatory_Microglia in CentralNervousSystem = 200;
  // Reactive microglia
  species $Pro_Inflammatory_Microglia in CentralNervousSystem = 50;
  // They are the largest type of leukocyte and can differentiate into macrophages and myeloid lineage dendritic cells.
  // Monocytes can differentiate into dendritic cells by adding the cytokines granulocyte macrophage colony-stimulating factor (GM-CSF) and interleukin 4.
  species $Monocyte in CentralNervousSystem = 1;
  // B cells, also known as B lymphocytes, are a type of white blood cell.
  // * They secrete antibodies.
  // * B cells are also classified as professional antigen-presenting cells (APCs)).
  // * B cells secrete cytokines.
  species $B_Cell in CentralNervousSystem = 1;
  // T cell, or T lymphocyte, is a type of lymphocyte that plays a central role in cell-mediated immunity.
  // They mature in the thymus which "selects for" T cells capable of interacting with MHC, and kill the "non-self" cells.
  // On can further categorize T cells in:
  // * Cytotoxic T cells (CD8+ T cells)
  // * Helper T cells (CD4+ T cells)
  // * Regulatory T cells
  // * Natural Killer T cells
  species $T_Cell in CentralNervousSystem = 1;
  // Dendritic cells are antigen-presenting cells. They process ("eat") material found in the ECM and present it to the T cells.
  // They act as messengers between the innate and the adaptive immune systems.
  species $DentriticCell in CentralNervousSystem = 1;
  // Cytokines
  species $Cytokines in CentralNervousSystem = 1;
  // Neuronal adenosine diphosphate
  species $ADPn in CentralNervousSystem;
  // Neuronal adenosine triphosphate
  species $ATPn in CentralNervousSystem = 2.2;
  // Neuronal sodium
  species $Nan in CentralNervousSystem = 15;
  // Neuronal glucose
  species $GLCn in CentralNervousSystem = 1.2;
  // Neuronal glyceraldehyde-3-phosphate
  species $GAPn in CentralNervousSystem = 0.0056;
  // Neuronal phosphoenolpyruvate
  species $PEPn in CentralNervousSystem = 0.02;
  // Neuronal pyruvate
  species $PYRn in CentralNervousSystem = 0.16;
  // Neuronal lactate
  species $LACn in CentralNervousSystem = 1;
  // Neuronal reduced form of nicotinamide adenine nucleotide
  species $NADHn in CentralNervousSystem = 0.026;
  // Neuronal phosphocreatine
  species $PCrn in CentralNervousSystem = 5;
  // Neuronal oxygen
  species $O2n in CentralNervousSystem = 0.026;
  // Neuronal adenosine monophosphate
  species $AMPn in CentralNervousSystem;
  // Atrocytic adenosine triphosphate
  species $ATPg in CentralNervousSystem = 2.2;
  // Astrocytic sodium
  species $Nag in CentralNervousSystem = 15;
  // Astrocytic glucose
  species $GLCg in CentralNervousSystem = 1.2;
  // Astrocytic glyceraldehyde-3-phosphate
  species $GAPg in CentralNervousSystem = 0.0056;
  // Astrocytic phosphoenolpyruvate
  species $PEPg in CentralNervousSystem = 0.02;
  // Astrocytic pyruvate
  species $PYRg in CentralNervousSystem = 0.16;
  // Astrocytic lactate
  species $LACg in CentralNervousSystem = 1.09;
  // Astrocytic reduced form of nicotinamide adenine nucleotide
  species $NADHg in CentralNervousSystem = 0.028;
  // Astrocytic phosphocreatine
  species $PCrg in CentralNervousSystem = 5;
  // Astrocytic oxygen
  species $O2g in CentralNervousSystem = 0.026;
  // Astrocytic adenosine diphosphate
  species $ADPg in CentralNervousSystem;
  // Atrocytic adenosine monophosphate
  species $AMPg in CentralNervousSystem;
  // Extracellular sodium, fixed value used in equation A.21
  species $Nae in Extracellular_space = 150;
  // Extracellular glucose
  species $GLCe in Extracellular_space = 1.2;
  // Extracellular lactate
  species $LACe in Extracellular_space = 1;
  // Deoxyhemoglobin
  species $dHb in Capillaries = 0.064;
  // Capillary oxygen
  species $O2c in Capillaries = 7;
  // Capillary glucose
  species $GLCc in Capillaries = 4.56;
  // Capillary lactate
  species $LACc in Capillaries = 0.35;
  // Oxygen fixed value used in equation A.38
  species $O2a in Veins = 8.34;
  // Glucose fixed value used in equation A.39
  species $GLCa in Veins = 4.8;
  // Lactate fixed value used in Equation A.40
  species $LACa in Veins = 0.313;
  // Venous volume
  species $Vv in Veins = 0.0237;

  // Parameters:
  //           Dead neurons
  a1 = 1;
  //           Living neurons
  a2 = 0.5;
  //           Pro Inflammatory Microglia
  a3 = 0;
  //           Anti Inflammatory Microglia
  a4 = 1;
  //           Pro Inflammatory Astroglia
  a5 = 1;
  //           Quiescent astroglia
  a7 = 0.5;
  NbOfNeurons = 1000000; NbOfNeurons is "Nb of neurons";
  NbOfMicroglia = 100000; NbOfMicroglia is "Nb of microglia";
  NbOfAstrocytes = 200000; NbOfAstrocytes is "Nb of astrocytes";
  Vcap = 0.0055;
  Vn = 0.45;
  Vg = 0.25;
  Ve = 0.2;
  qAK = 0.92;
  // AMP + ATP + ADP
  A = 2.212;
  // 4.3V0E0TE=4.3*40.3*0.32*0.04=2.22
  k1 = 2.22;
  // Epsilon*r0*E0*TE=1.43*25*0.32*0.04=0.46
  k2 = 0.46;
  // Epsilon-1=1.43-1=0.43
  k3 = 0.43;
  E0 = 0.32;
  Epsilon = 1.43;
  v0 = 40.3;
  TE = 0.04;
  r0 = 25;
  nop = 15;
  naero = 3;
  Sm_Vn = 90000; Sm_Vn is "Sm/Vn";
  Sm_Vg = 35000; Sm_Vg is "Sm/Vg";
  gnNa = 0.0039;
  ggNa = 0.0039;
  F = 96500;
  RT_F = 26.73; RT_F is "RT/F";
  Vm = -70;
  kPump = 2.9e-7;
  km_Pump = 0.5; km_Pump is "km,Pump";
  vn1 = 0.41;
  vg1 = 0.16;
  vn2 = 14.4;
  vg2 = 15.7;
  taunStim = 2;
  taugStim = 2;
  Tenmax_GLC = 5230; Tenmax_GLC is "Tenmax,GLC";
  Tegmax_GLC = 1020; Tegmax_GLC is "Tegmax,GLC";
  Kent_GLC = 9; Kent_GLC is "Kent,GLC";
  Kegt_GLC = 9; Kegt_GLC is "Kegt,GLC";
  Tcgmax_GLC = 0.0093; Tcgmax_GLC is "Tcgmax,GLC";
  Kcgt_GLC = 9; Kcgt_GLC is "Kcgt,GLC";
  Tcemax_GLC = 0.118; Tcemax_GLC is "Tcemax,GLC";
  Kcet_GLC = 9; Kcet_GLC is "Kcet,GLC";
  knHK_PFK = 0.12; knHK_PFK is "knHK-PFK";
  kgHK_PFK = 0.047; kgHK_PFK is "kgHK-PFK";
  kI_ATP = 1; kI_ATP is "kI,ATP";
  nH = 4;
  Kg = 0.05;
  k_nPGK = 42.6; k_nPGK is "k'nPGK";
  k_gPGK = 18.2; k_gPGK is "k'gPGK";
  N = 0.212;
  knPK = 86.7;
  kgPK = 34;
  kn_LDH = 2000; kn_LDH is "kn+LDH";
  kg_LDH = 780; kg_LDH is "kg+LDH";
  kn_LDH_0 = 44.8; kn_LDH_0 is "kn-LDH";
  kg_LDH_0 = 17.6; kg_LDH_0 is "kg-LDH";
  Tnemax_LAC = 0.29; Tnemax_LAC is "Tnemax,LAC";
  Tgemax_LAC = 0.076; Tgemax_LAC is "Tgemax,LAC";
  Knet_LAC = 0.5; Knet_LAC is "Knet,LAC";
  Kget_LAC = 0.5; Kget_LAC is "Kget,LAC";
  Tgcmax_LAC = 0.0058; Tgcmax_LAC is "Tgcmax,LAC";
  Kgct_LAC = 0.5; Kgct_LAC is "Kgct,LAC";
  Tecmax_LAC = 0.00783; Tecmax_LAC is "Tecmax,LAC";
  Kect_LAC = 0.5; Kect_LAC is "Kect,LAC";
  Vnmax_Mito = 0.021; Vnmax_Mito is "Vnmax,Mito";
  Vgmax_Mito = 0.005; Vgmax_Mito is "Vgmax,Mito";
  Km_Mito = 0.05; Km_Mito is "Km,Mito";
  KO2__A_34 = 0.001; KO2__A_34 is "KO2 (A.34)";
  KnmADP = 0.005;
  KgmADP = 0.005;
  kn_CK = 0.36; kn_CK is "kn+CK";
  kg_CK = 0.14; kg_CK is "kg+CK";
  kn_CK_0 = 0.002; kn_CK_0 is "kn-CK";
  kg_CK_0 = 0.00078; kg_CK_0 is "kg-CK";
  C = 10;
  PScap_Vn = 1.73; PScap_Vn is "PScap/Vn";
  PScap_Vg = 0.414; PScap_Vg is "PScap/Vg";
  KO2__A_37 = 0.0361; KO2__A_37 is "KO2 (A.37)";
  Hb_OP = 8.6; Hb_OP is "Hb.OP";
  nh = 2.73;
  alphaF = 0.7;
  F0 = 0.012;
  t1 = 5;
  tend = 360;
  alpha = 0.5;
  tauv = 35;
  var VnLeak_Na; VnLeak_Na is "VnLeak-Na";
  var VgLeak_Na; VgLeak_Na is "VgLeak-Na";
  var VnStim_t; VnStim_t is "VnStim(t)";
  var VgStim_t; VgStim_t is "VgStim(t)";
  var VnHK_PFK; VnHK_PFK is "VnHK-PFK";
  var VgHK_PFK; VgHK_PFK is "VgHK-PFK";
  VnATPases = 0.17;
  VgATPases = 0.02;
  var O2C; O2C is "O2C/";
  var dAMP_dATPg; dAMP_dATPg is "dAMP-dATPg";
  var dAMP_dATPn; dAMP_dATPn is "dAMP-dATPn";
  Vv0 = 0.0236;
  dHb0 = 0.064;

  // Assignment rules:
  ADPn := ATPn/2*(-qAK + (qAK^2 + 4*qAK*(A/ATPn - 1))^(1/2));
  AMPn := A - (ATPn + ADPn);
  ADPg := ATPg/2*(-qAK + (qAK^2 + 4*qAK*(A/ATPg - 1))^(1/2));
  AMPg := A - (ATPg + ADPg);
  rcn := Vcap/Vn;
  rcg := Vcap/Vg;
  rce := Vcap/Ve;
  reg := Ve/Vg;
  ren := Ve/Vn;
  un := qAK^2 + 4*qAK*(A/ATPn - 1);
  ug := qAK^2 + 4*qAK*(A/ATPg - 1);
  BOLD := Vv0*((k1 + k2)*(1 - dHb/dHb0) - (k2 + k3)*(1 - Vv/Vv0));
  VnLeak_Na := Sm_Vn*(gnNa/F)*(RT_F*ln(Nae/Nan) - Vm);
  VgLeak_Na := Sm_Vg*(ggNa/F)*(RT_F*ln(Nae/Nag) - Vm);
  VnPump := Sm_Vn*kPump*ATPn*Nan*(1 + ATPn/km_Pump)^(-1);
  VgPump := Sm_Vg*kPump*ATPg*Nag*(1 + ATPg/km_Pump)^(-1);
  VnStim_t := piecewise(vn1 + vn2*(time/taunStim)*exp(-time/taunStim), (time >= 0) && (time <= tend), 0);
  VgStim_t := piecewise(vg1 + vg2*(time/taugStim)*exp(-time/taugStim), (time >= 0) && (time <= tend), 0);
  VenGLC := Tenmax_GLC*(GLCe/(GLCe + Kent_GLC) - GLCn/(GLCn + Kent_GLC));
  VegGLC := Tegmax_GLC*(GLCe/(GLCe + Kegt_GLC) - GLCg/(GLCg + Kegt_GLC));
  VcgGLC := Tcgmax_GLC*(GLCc/(GLCc + Kcgt_GLC) - GLCg/(GLCg + Kcgt_GLC));
  VceGLC := Tcemax_GLC*(GLCc/(GLCc + Kcet_GLC) - GLCe/(GLCe + Kcet_GLC));
  VnHK_PFK := knHK_PFK*ATPn*(1 + (ATPn/kI_ATP)^nH)^(-1)*(GLCn/(GLCn + Kg));
  VgHK_PFK := kgHK_PFK*ATPg*(1 + (ATPg/kI_ATP)^nH)^(-1)*(GLCg/(GLCg + Kg));
  VnPGK := k_nPGK*GAPn*ADPn*((N - NADHn)/NADHn);
  VgPGK := k_gPGK*GAPg*ADPg*((N - NADHg)/NADHg);
  VnPK := knPK*PEPn*ADPn;
  VgPK := kgPK*PEPg*ADPg;
  VnLDH := kn_LDH*PYRn*NADHn - kn_LDH_0*LACn*(N - NADHn);
  VgLDH := kg_LDH*PYRg*NADHg - kg_LDH_0*LACg*(N - NADHg);
  VneLAC := Tnemax_LAC*(LACn/(LACn + Knet_LAC) - LACe/(LACe + Knet_LAC));
  VgeLAC := Tgemax_LAC*(LACg/(LACg + Kget_LAC) - LACe/(LACe + Kget_LAC));
  VgcLAC := Tgcmax_LAC*(LACg/(LACg + Kgct_LAC) - LACc/(LACc + Kgct_LAC));
  VecLAC := Tecmax_LAC*(LACe/(LACe + Kect_LAC) - LACc/(LACc + Kect_LAC));
  VnMito := Vnmax_Mito*(PYRn/(Km_Mito + PYRn))*(O2n/(KO2__A_34 + O2n))*(ADPn/(KnmADP + ADPn));
  VgMito := Vgmax_Mito*(PYRg/(Km_Mito + PYRg))*(O2g/(KO2__A_34 + O2g))*(ADPg/(KgmADP + ADPg));
  VnCK := kn_CK*PCrn*ADPn - kn_CK_0*(C - PCrn)*ATPn;
  VgCK := kg_CK*PCrg*ADPg - kg_CK_0*(C - PCrg)*ATPg;
  VcnO2m := PScap_Vn*(KO2__A_37*(Hb_OP/O2c - 1)^(-1/nh) - O2n);
  VcgO2m := PScap_Vg*(KO2__A_37*(Hb_OP/O2c - 1)^(-1/nh) - O2g);
  Fin_t := piecewise((1 + alphaF)*F0, (time >= t1) && (time <= tend), piecewise(F0, (time == 0) && (time >= tend + t1), time));
  VcO2 := 2*Fin_t/Vcap*(O2a - O2c);
  VcGLC := 2*Fin_t/Vcap*(GLCa - GLCc);
  VcLAC := 2*Fin_t/Vcap*(LACa - LACc);
  Fout_t := F0*((Vv/Vv0)^(1/alpha) + tauv*(Vv/Vv0)^(-0.5)*(1/Vv0)*Vv);
  O2C := 2*O2c - O2a;
  dAMP_dATPg := qAK/2 + qAK*(A/(ATPg*ug^(1/2))) - (1 + 0.5*ug^(1/2));
  dAMP_dATPn := qAK/2 + qAK*(A/(ATPn*un^(1/2))) - (1 + 0.5*un^(1/2));

  // Rate rules:
  DeadLowerMotoNeurons' = NbOfNeurons*((a5*Pro_Inflammatory_Astroglia + a3*Pro_Inflammatory_Microglia)/(NbOfAstrocytes + NbOfMicroglia));
  LivingLowerMotoNeurons' = -DeadLowerMotoNeurons;
  Quiescent_Astroglia' = a4*Anti_Inflammatory_Microglia - a5*Pro_Inflammatory_Microglia;
  Pro_Inflammatory_Astroglia' = a3*Pro_Inflammatory_Microglia;
  Anti_Inflammatory_Microglia' = a2*Quiescent_Astroglia - a1*DeadLowerMotoNeurons/10;
  Pro_Inflammatory_Microglia' = DeadLowerMotoNeurons;
  ATPn' = (-2*VnHK_PFK + VnPGK + VnPK - VnATPases - VnPump + nop*VnMito + VnCK)*(1 - dAMP_dATPn)^(-1);
  Nan' = VnLeak_Na - 3*VnPump + VnStim_t;
  GLCn' = VenGLC - VnHK_PFK;
  GAPn' = 2*VnHK_PFK - VnPGK;
  PEPn' = VnPGK - VnPK;
  PYRn' = VnPK - VnLDH - VnMito;
  LACn' = VnLDH - VneLAC;
  NADHn' = VnPGK - VnLDH - VnMito;
  PCrn' = -VnCK;
  O2n' = VcnO2m - naero*VnMito;
  ATPg' = (-2*VgHK_PFK + VgPGK + VgPK - VgATPases - VgPump + nop*VgMito + VgCK)*(1 - dAMP_dATPg)^(-1);
  Nag' = VgLeak_Na - 3*VgPump + VgStim_t;
  GLCg' = VcgGLC + VegGLC - VgHK_PFK;
  GAPg' = 2*VgHK_PFK - VgPGK;
  PEPg' = VgPGK - VgPK;
  PYRg' = VgPK - VgLDH - VgMito;
  LACg' = VgLDH - VgeLAC - VgcLAC;
  NADHg' = VgPGK - VgLDH - VgMito;
  PCrg' = -VgCK;
  O2g' = VcgO2m - naero*VgMito;
  GLCe' = VceGLC - 1/reg*VegGLC - 1/ren*VenGLC;
  LACe' = 1/ren*VneLAC + 1/reg*VgeLAC - VecLAC;
  dHb' = Fin_t*(O2a - O2C) - Fout_t*(dHb/Vv);
  O2c' = VcO2 - 1/rcn*VcnO2m - 1/rcg*VcgO2m;
  GLCc' = VcGLC - 1/rce*VceGLC - 1/rcg*VcgGLC;
  LACc' = VcLAC + 1/rce*VecLAC + 1/rcg*VgcLAC;
  Vv' = Fin_t - Fout_t;

  // Unit definitions:
  unit volume = 1e-3 litre;
  unit time = second;
  unit substance = dimensionless;
end
