// SBML level 2 version 4

model MODEL_to_be_done()
  // JPLeRouzic2018 - Interaction between astrocytes and neurons in Amyotrophic lateral sclerosis (ALS)
  // JPLeRouzic2018 - Interactions between astrocytes and neurons in Amyotrophic lateral sclerosis (ALS)
  // Encoded non-curated model. Issues:
  // To be done
  // This model is described in the article:
  // Motor neuron-immune interactions: The vicious circle of ALS.
  // Barbeito AG, Mesci P, Boillée S.
  // J Neural Transm (Vienna). 2010 Aug;117(8):981-1000.
  // Abstract:
  // Because microglial cells, the resident macrophages of the CNS, react to any lesion of the nervous system,
  // they have for long been regarded as potential players in the pathogenesis of several neurodegenerative disorders including amyotrophic lateral sclerosis,
  // the most common motor neuron disease in the adult.
  // In recent years, this microglial reaction to motor neuron injury, in particular, and the innate immune response, in general,
  // has been implicated in the progression of the disease, in mouse models of ALS.
  // The mechanisms by which microglial cells influence motor neuron death in ALS are still largely unknown.
  // Microglial activation increases over the course of the disease and is associated with an alteration in the production of toxic factors and also
  // neurotrophic factors.
  // Adding to the microglial/macrophage response to motor neuron degeneration, the adaptive immune system can likewise influence the disease process.
  // Exploring these motor neuron-immune interactions could lead to a better understanding in the physiopathology of ALS to find
  // new pathways to slow down motor neuron degeneration.
  // This model will be hosted on BioModels Database and identified by: MODEL-to-be-done .
  // To cite BioModels Database, please use: BioModels Database: An enhanced, curated and annotated resource for published quantitative kinetic models .
  // To the extent possible under law, all copyright and related or neighbouring rights to this encoded model have been dedicated to the public domain worldwide. Please refer to CC0 Public Domain Dedication for more information.

  // Compartments:
  compartment CentralNervousSystem = 1;
  compartment Extracellular_space = 0.2;
  compartment Capillaries = 0.0055;
  compartment Veins = 0.0237;

  // Species:
  // Pre-Synaptic Neurons
  species $PreSynapticNeurons in CentralNervousSystem = 999999;
  // Exocytosis
  species $Exocytosis in CentralNervousSystem = 999999;
  // A motor unit is made up of a motor neuron and the skeletal muscle fibers innervated by that motor neuron's axonal terminals.
  // Groups of motor units often work together to coordinate the contractions of a single muscle.
  // All of the motor units within a muscle are considered a motor pool.
  species $BrokenMotorUnit in CentralNervousSystem = 1;
  // Surviving Upper neurons
  // Upper motor neurons are found in the brain and carry motor information down the spinal cord to activate the lower motor neurons,
  species $LivingUpperMotoNeurons in CentralNervousSystem = 999999;
  // Dead Upper neurons
  // Upper motor neurons are found in the brain and carry motor information down the spinal cord to activate the lower motor neurons,
  species $DeadUpperMotoNeurons in CentralNervousSystem = 1;
  // Surviving lower motor neurons
  // The efferent fiber carries nerve impulses away from the the spinal cord, and toward the muscles.
  species $LivingLowerMotoNeurons in CentralNervousSystem = 999999;
  // Dead lower motor neurons
  // The efferent fiber carries nerve impulses away from the the spinal cord, and toward the muscles.
  species $DeadLowerMotoNeurons in CentralNervousSystem = 1;
  // Quiescent astroglia
  species $Quiescent_Astroglia in CentralNervousSystem = 200;
  // Proliferating astroglia
  species $Pro_Inflammatory_Astroglia in CentralNervousSystem = 50;
  // Normal microglia
  species $Anti_Inflammatory_Microglia in CentralNervousSystem = 200;
  // Reactive microglia
  species $Pro_Inflammatory_Microglia in CentralNervousSystem = 50;
  // They are the largest type of leukocyte and can differentiate into macrophages and myeloid lineage dendritic cells.
  // Monocytes can differentiate into dendritic cells by adding the cytokines granulocyte macrophage colony-stimulating factor (GM-CSF) and interleukin 4.
  species $Monocyte in CentralNervousSystem = 1;
  // B cells, also known as B lymphocytes, are a type of white blood cell.
  // * They secrete antibodies.
  // * B cells are also classified as professional antigen-presenting cells (APCs)).
  // * B cells secrete cytokines.
  species $B_Cell in CentralNervousSystem = 1;
  // T cell, or T lymphocyte, is a type of lymphocyte that plays a central role in cell-mediated immunity.
  // They mature in the thymus which "selects for" T cells capable of interacting with MHC, and kill the "non-self" cells.
  // On can further categorize T cells in:
  // * Cytotoxic T cells (CD8+ T cells)
  // * Helper T cells (CD4+ T cells)
  // * Regulatory T cells
  // * Natural Killer T cells
  species $T_Cell in CentralNervousSystem = 1;
  // Dendritic cells are antigen-presenting cells. They process ("eat") material found in the ECM and present it to the T cells.
  // They act as messengers between the innate and the adaptive immune systems.
  species $DentriticCell in CentralNervousSystem = 1;
  // Cytokines
  species $Cytokines in CentralNervousSystem = 1;
  // Sodium
  species $NAg in CentralNervousSystem = 13.36;
  // Glucose
  species $GLCg in CentralNervousSystem = 0.1656;
  // Glucose-6-P
  species $G6Pg in CentralNervousSystem = 0.7326;
  // Fructose-6-P
  species $F6Pg in CentralNervousSystem = 0.1116;
  // Glyceraldehyde-3-P
  species $GAPg in CentralNervousSystem = 0.0698;
  // Phosphoenolpyruvate
  species $PEPg in CentralNervousSystem = 0.0254;
  // Pyruvate
  species $PYRg in CentralNervousSystem = 0.1711;
  // Lactate
  species $LACg in CentralNervousSystem = 0.4651;
  // Nicotinamide adenine dinucleotide reduced
  species $NADHg in CentralNervousSystem = 0.0445;
  // Adenosine triphosphate
  species $ATPg in CentralNervousSystem = 2.24;
  // Phosphocreatine
  species $PCrg in CentralNervousSystem = 4.6817;
  // Oxygen
  species $O2g in CentralNervousSystem = 0.1589;
  // Glycogen
  species $GLYg in CentralNervousSystem = 2.5;
  // Glutamate
  species $GLUg in CentralNervousSystem = 0;
  // Nicotinamide adenine dinucleotide oxidized
  species $NADg in CentralNervousSystem;
  // Adenosine diphosphate
  species $ADPg in CentralNervousSystem;
  // Creatine
  species $CRg in CentralNervousSystem;
  // Nicotinamide adenine dinucleotide reduced
  species $NADH_g_tot in CentralNervousSystem = 0.22;
  // Phosphocreatine
  species $PCrg_tot in CentralNervousSystem = 5;
  // Adenosine monophosphate
  species $AMPg in CentralNervousSystem;
  // Oxygen
  species $O2c in Capillaries = 7.4201;
  // Glucose
  species $GLCc in Capillaries = 4.6401;
  // Lactate
  species $LACc in Capillaries = 0.3251;
  // Carbon dioxide
  species $CO2c in Capillaries = 2.12;
  // Glucose
  species $GLCe in Extracellular_space = 0.3339;
  // Lactate
  species $LACe in Extracellular_space = 0.3986;
  // Glutamate
  species $GLUe in Extracellular_space = 0;
  // Sodium
  species $NAe in Extracellular_space = 150;
  // Oxygen
  species $O2a in Extracellular_space = 8.34;
  // Carbon dioxide
  species $CO2a in Extracellular_space = 1.2;
  // Glucose
  species $GLCa in Extracellular_space = 4.8;
  // Lactate
  species $LACa in Extracellular_space = 0.313;
  // Sodium
  species $NAn in CentralNervousSystem = 15.533;
  // Glucose
  species $GLCn in CentralNervousSystem = 0.2633;
  // Glucose-6-P
  species $G6Pn in CentralNervousSystem = 0.7275;
  // Fructose-6-P
  species $F6Pn in CentralNervousSystem = 0.1091;
  // Glyceraldehyde-3-P
  species $GAPn in CentralNervousSystem = 0.0418;
  // Phosphoenolpyruvate
  species $PEPn in CentralNervousSystem = 0.0037;
  // Pyruvate
  species $PYRn in CentralNervousSystem = 0.0388;
  // Lactate
  species $LACn in CentralNervousSystem = 0.3856;
  // Nicotinamide adenine dinucleotide reduced
  species $NADHn in CentralNervousSystem = 0.0319;
  // Adenosine triphosphate
  species $ATPn in CentralNervousSystem = 2.2592;
  // Posphocreatine
  species $PCrn in CentralNervousSystem = 4.2529;
  // Oxygen
  species $O2n in CentralNervousSystem = 0.0975;
  // Glutamate
  species $GLUn in CentralNervousSystem = 3;
  // Adenosine diphosphate
  species $ADPn in CentralNervousSystem;
  // Creatine
  species $CRn in CentralNervousSystem;
  // Nicotinamide adenine dinucleotide oxidized
  species $NADn in CentralNervousSystem;
  // Nicotinamide adenine dinucleotide reduced
  species $NADH_n_tot in CentralNervousSystem = 0.22;
  // Phosphocreatine
  species $PCrn_tot in CentralNervousSystem = 5;
  // Adenosine monophosphate
  species $AMPn in CentralNervousSystem;

  // Parameters:
  //           Dead neurons
  a1 = 1;
  //           Living neurons
  a2 = 0.5;
  //           Pro Inflammatory Microglia
  a3 = 0;
  //           Anti Inflammatory Microglia
  a4 = 1;
  //           Pro Inflammatory Astroglia
  a5 = 1;
  //           Quiescent astroglia
  a7 = 0.5;
  NbOfNeurons = 1000000; NbOfNeurons is "Nb of neurons";
  NbOfMicroglia = 100000; NbOfMicroglia is "Nb of microglia";
  NbOfAstrocytes = 200000; NbOfAstrocytes is "Nb of astrocytes";
  Vv = 0.0237;
  dHb = 0.0218;
  gn_NA = 0.0039;
  Km_en_GLC = 5.32;
  Vm_en_GLC = 0.50417;
  Vmax_n_hk = 0.0513;
  Vmaxf_n_pgi = 0.5;
  Vmaxr_n_pgi = 0.45;
  kn_pfk = 0.55783;
  kn_pgk = 0.4287;
  kn_pk = 28.6;
  kfn_ldh = 5.3;
  krn_ldh = 0.1046;
  Vmax_n_mito = 0.05557;
  Vmax_ne_LAC = 0.1978;
  Km_ne_LAC = 0.09314;
  Vmax_n_ATPase = 0.04889;
  krn_ck = 0.015;
  kfn_ck = 0.0524681;
  nh_O2_Vcn_O2 = 2.7;
  PScapn = 0.2202;
  gg_NA = 0.00325;
  Km_eg_GLC = 3.53;
  Vm_eg_GLC = 0.038089;
  Km_cg_GLC = 9.92;
  Vm_cg_GLC = 0.0098394;
  Vmax_g_hk = 0.050461;
  Vmaxf_g_pgi = 0.5;
  Vmaxr_g_pgi = 0.45;
  kg_pfk = 0.403;
  kg_pgk = 0.2514;
  kg_pk = 2.73;
  kfg_ldh = 6.2613;
  krg_ldh = 0.54682;
  Vmax_g_mito = 0.008454;
  Vmax_ge_LAC = 0.086124;
  Km_ge_LAC = 0.22163;
  Vmax_gc_LAC = 0.00021856;
  Km_gc_LAC = 0.12862;
  Vmax_g_ATPase = 0.035657;
  krg_ck = 0.02073;
  kfg_ck = 0.0243;
  PScapg = 0.2457;
  Km_ce_GLC = 8.4568;
  Vm_ce_GLC = 0.0489;
  Km_ec_LAC = 0.764818;
  Vm_ec_LAC = 0.0325;
  Vmax_g_gs = 0.3;
  Vmax_eg_GLU = 0.0208;
  Vmax_glys = 0.0001528;
  Km_G6P_glys = 0.5;
  Vmax_glyp = 4.922e-5;
  Km_GLY = 1;
  CBF0_Fin_t = 0.012;
  Km_PYR = 0.0632;
  Km_ATP = 0.01532;
  Ki_ATP = 0.7595;
  Km_ADP = 0.00107;
  Km_O2 = 0.0029658;
  Km_GLC = 0.105;
  Km_GLU = 0.05;
  Km_G6P = 0.5;
  Km_F6P_pgi = 0.06;
  Km_F6P_pfk = 0.18;
  Km_pump = 0.4243;
  nh_O2_model_parameters = 2.7; nh_O2_model_parameters is "nh_O2_2";
  Ko2 = 0.089733;
  kpump = 3.17e-7;
  ATPtot = 2.379;
  nH = 4;
  nOP = 15;
  NAero = 3;
  Rng = 1.8;
  Reg = 0.8;
  Ren = 0.4444444;
  Rcn = 0.01222;
  Rcg = 0.022;
  Rce = 0.0275;
  Sm_n = 40500;
  Vm = -70;
  RT = 2577340;
  F = 96500;
  Vn = 0.45;
  G6P_inh_hk = 0.6;
  aG6P_inh_hk = 20;
  rATP_mito = 20;
  aATP_mito = 5;
  HbOP = 8.6;
  Sm_g = 10500;
  Vg = 0.25;
  KO1 = 1;
  Vc = 0.0055;
  R_GLU_NA = 0.075;
  KO2 = 1;
  KO3 = 1;
  GLY_inh = 4.2;
  aGLY_inh = 20;
  CBF0_model_parameters = 0.012; CBF0_model_parameters is "CBF0_2";
  Vv0 = 0.0236;
  tv = 35;
  qak = 0.92;
  k1 = 2.22;
  k2 = 0.46;
  k3 = 0.43;
  dHb0 = 0.064;
  stim = 1;
  to = 200;
  tend = 300;
  v1_n = 0.041;
  v2_n = 2.55;
  t_n_stim = 2;
  sr = 4.59186;
  t1 = 2;
  delta_GLY = 62;
  deltaf = 0.42;
  tend_GLY = 440;
  to_GLY = 83;
  sr_GLY = 4;

  // Assignment rules:
  V_en_GLC := Vm_en_GLC*(GLCe/(GLCe + Km_en_GLC) - GLCn/(GLCn + Km_en_GLC));
  Vn_hk := Vmax_n_hk*ATPn*(GLCn/(GLCn + Km_GLC))*(1 - 1/(1 + exp(-aG6P_inh_hk*1*(G6Pn - G6P_inh_hk))));
  Vn_pgi := Vmaxf_n_pgi*(G6Pn/(G6Pn + Km_G6P)) - Vmaxr_n_pgi*(F6Pn/(F6Pn + Km_F6P_pgi));
  NADg := NADH_g_tot - NADHg;
  ADPg := ATPg/2*(-qak + (qak^2 + 4*qak*(ATPtot/ATPg - 1))^(1/2));
  CRg := PCrg_tot - PCrg;
  AMPg := ATPtot - (ATPg + ADPg);
  Vg_ck := kfg_ck*PCrg*ADPg - krg_ck*CRg*ATPg;
  ADPn := ATPn/2*(-qak + (qak^2 + 4*qak*(ATPtot/ATPn - 1))^(1/2));
  CRn := PCrn_tot - PCrn;
  NADn := NADH_n_tot - NADHn;
  AMPn := ATPtot - (ATPn + ADPn);
  u_n := qak^2 + 4*qak*(ATPtot/ATPn - 1);
  u_g := qak^2 + 4*qak*(ATPtot/ATPg - 1);
  dAMP_dATPn := qak/2 + qak*(ATPtot/(ATPn*u_n^(1/2))) - (1 + 0.5*u_n^(1/2));
  dAMP_dATPg := qak/2 + qak*(ATPtot/(ATPg*u_g^(1/2))) - (1 + 0.5*u_g^(1/2));
  Vn_leak_Na := Sm_n/Vn*(gn_NA/F)*(RT/F*ln(NAe/NAn) - Vm);
  Vn_pump := Sm_n/Vn*kpump*ATPn*NAn*(1 + ATPn/Km_pump)^(-1);
  Vn_pfk := kn_pfk*ATPn*(F6Pn/(F6Pn + Km_F6P_pfk))*(1 + (ATPn/Ki_ATP)^nH)^(-1);
  Vn_pgk := kn_pgk*GAPn*ADPn*(NADn/NADHn);
  Vn_pk := kn_pk*PEPn*ADPn;
  Vn_ldh := kfn_ldh*PYRn*NADHn - krn_ldh*LACn*NADn;
  Vn_mito := Vmax_n_mito*(O2n/(O2n + Km_O2))*(ADPn/(ADPn + Km_ADP))*(PYRn/(PYRn + Km_PYR))*(1 - 1/(1 + exp(-aATP_mito*1*(ATPn/ADPn - 1*rATP_mito))));
  Vne_LAC := Vmax_ne_LAC*(LACn/(LACn + Km_ne_LAC) - LACe/(LACe + Km_ne_LAC));
  Vn_ATPase := Vmax_n_ATPase*(ATPn/(ATPn + 0.001));
  Vge_LAC := Vmax_ge_LAC*(LACg/(LACg + Km_ge_LAC) - LACe/(LACe + Km_ge_LAC));
  Vn_ck := kfn_ck*PCrn*ADPn - krn_ck*CRn*ATPn;
  Vcn_O2 := PScapn/Vn*(Ko2*(HbOP/O2c - 1)^(-1/nh_O2_Vcn_O2) - O2n);
  Vg_leak_Na := Sm_g/Vg*(gg_NA/F)*(RT/F*ln(NAe/NAg) - Vm);
  Vg_pump := Sm_g/Vg*kpump*ATPg*NAg*(1 + ATPg/Km_pump)^(-1);
  Veg_GLC := KO1*Vm_eg_GLC*(GLCe/(GLCe + Km_eg_GLC) - GLCg/(GLCg + Km_eg_GLC));
  Vcg_GLC := Vm_cg_GLC*(GLCc/(GLCc + Km_cg_GLC) - GLCg/(GLCg + Km_cg_GLC));
  Vg_hk := Vmax_g_hk*ATPg*(GLCg/(GLCg + Km_GLC))*(1 - 1/(1 + exp(-aG6P_inh_hk*1*(G6Pg - G6P_inh_hk))));
  Vg_pgi := Vmaxf_g_pgi*(G6Pg/(G6Pg + Km_G6P)) - Vmaxr_g_pgi*(F6Pg/(F6Pg + Km_F6P_pgi));
  Vg_pfk := kg_pfk*ATPg*(F6Pg/(F6Pg + Km_F6P_pfk))*(1 + (ATPg/Ki_ATP)^nH)^(-1);
  Vg_pgk := kg_pgk*GAPg*ADPg*(NADg/NADHg);
  Vg_pk := kg_pk*PEPg*ADPg;
  Vg_ldh := kfg_ldh*PYRg*NADHg - krg_ldh*LACg*NADg;
  Vg_mito := Vmax_g_mito*(O2g/(O2g + Km_O2))*(ADPg/(ADPg + Km_ADP))*(PYRg/(PYRg + Km_PYR))*(1 - 1/(1 + exp(1*(-aATP_mito)*(ATPg/ADPg - 1*rATP_mito))));
  Vgc_LAC := Vmax_gc_LAC*(LACg/(LACg + Km_gc_LAC) - LACc/(LACc + Km_gc_LAC));
  Vg_ATPase := Vmax_g_ATPase*(ATPg/(ATPg + 0.001));
  Vcg_O2 := PScapg/Vg*(Ko2*(HbOP/O2c - 1)^(-1/nh_O2_model_parameters) - O2g);
  Vce_GLC := Vm_ce_GLC*(GLCc/(GLCc + Km_ce_GLC) - GLCe/(GLCe + Km_ce_GLC));
  Vec_LAC := Vm_ec_LAC*(LACe/(LACe + Km_ec_LAC) - LACc/(LACc + Km_ec_LAC));
  Vnc_CO2 := 3*Vn_mito;
  Vgc_CO2 := 3*Vg_mito;
  Vg_gs := Vmax_g_gs*(GLUg/(GLUg + Km_GLU))*(ATPg/(ATPg + Km_ATP));
  Veg_GLU := Vmax_eg_GLU*(GLUe/(GLUe + Km_GLU));
  Vg_glys := Vmax_glys*(G6Pg/(G6Pg + Km_G6P_glys))*(1 - 1/(1 + exp(-aGLY_inh*1*(GLYg - GLY_inh))));
  Fin_t := CBF0_Fin_t + (stim*CBF0_Fin_t*deltaf*(1/(1 + exp(1*(-sr)*(time - (to + t1 - 3))))) - stim*CBF0_Fin_t*deltaf*(1/(1 + exp(1*(-sr)*(time - (to + tend + t1 + 3))))));
  Vc_O2 := 2*(Fin_t/Vc)*(O2a - O2c);
  Vc_GLC := 2*(Fin_t/Vc)*(GLCa - GLCc);
  Vc_LAC := 2*(Fin_t/Vc)*(LACa - LACc);
  Vc_CO2 := 2*(Fin_t/Vc)*(CO2c - CO2a);
  Fout_t := CBF0_model_parameters*(((Vv/Vv0)^2 + tv*(Vv/Vv0)^(-0.5)*(Fin_t/Vv0))/(1 + CBF0_model_parameters*tv*(Vv/Vv0)^(-0.5)*(1/Vv0)));
  BOLD := Vv0*((k1 + k2)*(1 - dHb/dHb0) - (k2 + k3)*(1 - Vv/Vv0));
  unitpulseSB := piecewise(1, (time >= to) && (time <= to + tend), 0);
  v_stim := stim*(v1_n + v2_n*((time - to)/t_n_stim)*exp(-((time - to)*(unitpulseSB/t_n_stim))))*unitpulseSB;
  Vn_stim := v_stim;
  Vn_stim_GLU := Vn_stim*R_GLU_NA*KO2*(GLUn/(GLUn + Km_GLU));
  unitstepSB := piecewise(1, time - (tend + to) >= 0, 0);
  unitstepSB2 := piecewise(1, time - (tend_GLY + to + to_GLY) >= 0, 0);
  deltaVt_GLY := 1 + stim*delta_GLY*KO3*(1/(1 + exp(1*(-sr_GLY)*(time - (to + to_GLY)))))*(1 - unitstepSB2);
  Vg_glyp := Vmax_glyp*(GLYg/(GLYg + Km_GLY))*deltaVt_GLY;

  // Rate rules:
  DeadLowerMotoNeurons' = NbOfNeurons*((a5*Pro_Inflammatory_Astroglia + a3*Pro_Inflammatory_Microglia)/(NbOfAstrocytes + NbOfMicroglia));
  LivingLowerMotoNeurons' = -DeadLowerMotoNeurons;
  Quiescent_Astroglia' = a4*Anti_Inflammatory_Microglia - a5*Pro_Inflammatory_Microglia;
  Pro_Inflammatory_Astroglia' = a3*Pro_Inflammatory_Microglia;
  Anti_Inflammatory_Microglia' = a2*Quiescent_Astroglia - a1*DeadLowerMotoNeurons/10;
  Pro_Inflammatory_Microglia' = DeadLowerMotoNeurons;
  NAg' = Vg_leak_Na + 3*Veg_GLU - 3*Vg_pump;
  GLCg' = Vcg_GLC + Veg_GLC - Vg_hk;
  G6Pg' = Vg_hk + Vg_glyp - (Vg_pgi + Vg_glys);
  F6Pg' = Vg_pgi - Vg_pfk;
  GAPg' = 2*Vg_pfk - Vg_pgk;
  PEPg' = Vg_pgk - Vg_pk;
  PYRg' = Vg_pk - (Vg_ldh + Vg_mito);
  LACg' = Vg_ldh - (Vge_LAC + Vgc_LAC);
  NADHg' = Vg_pgk - (Vg_ldh + Vg_mito);
  ATPg' = (Vg_pgk + Vg_pk + nOP*Vg_mito + Vg_ck - (Vg_hk + Vg_pfk + Vg_ATPase + Vg_pump + Vg_gs))*(1 - dAMP_dATPg)^(-1);
  PCrg' = -Vg_ck;
  O2g' = Vcg_O2 - NAero*Vg_mito;
  GLYg' = Vg_glys - Vg_glyp;
  GLUg' = Veg_GLU - Vg_gs;
  O2c' = Vc_O2 - (Vcn_O2*(1/Rcn) + Vcg_O2*(1/Rcg));
  GLCc' = Vc_GLC - (Vce_GLC*(1/Rce) + Vcg_GLC*(1/Rcg));
  LACc' = Vc_LAC + Vec_LAC*(1/Rce) + Vgc_LAC*(1/Rcg);
  CO2c' = Vnc_CO2*(1/Rcn) + Vgc_CO2*(1/Rcg) - Vc_CO2;
  GLCe' = Vce_GLC - (Veg_GLC*(1/Reg) + V_en_GLC*(1/Ren));
  LACe' = Vne_LAC*(1/Ren) + Vge_LAC*(1/Reg) - Vec_LAC;
  GLUe' = Vn_stim_GLU*(1/Ren) - Veg_GLU*(1/Reg);
  NAn' = Vn_leak_Na + Vn_stim - 3*Vn_pump;
  GLCn' = V_en_GLC - Vn_hk;
  G6Pn' = Vn_hk - Vn_pgi;
  F6Pn' = Vn_pgi - Vn_pfk;
  GAPn' = 2*Vn_pfk - Vn_pgk;
  PEPn' = Vn_pgk - Vn_pk;
  PYRn' = Vn_pk - (Vn_ldh + Vn_mito);
  LACn' = Vn_ldh - Vne_LAC;
  NADHn' = Vn_pgk - (Vn_ldh + Vn_mito);
  ATPn' = (Vn_pgk + Vn_pk + nOP*Vn_mito + Vn_ck - (Vn_hk + Vn_pfk + Vn_ATPase + Vn_pump))*(1 - dAMP_dATPn)^(-1);
  PCrn' = -Vn_ck;
  O2n' = Vcn_O2 - NAero*Vn_mito;
  GLUn' = Vg_gs*(1/Rng) - Vn_stim_GLU;
  Vv' = Fin_t - Fout_t;
  dHb' = Fin_t*(O2a - O2c) - Fout_t*(dHb/Vv);

  // Unit definitions:
  unit volume = 1e-3 litre;
  unit time = second;
  unit substance = dimensionless;
end
