// SBML level 2 version 4

model MODEL_to_be_done()
  // JPLeRouzic2018 - Interaction between astrocytes and neurons in Amyotrophic lateral sclerosis (ALS)
  // JPLeRouzic2018 - Interactions between astrocytes and neurons in Amyotrophic lateral sclerosis (ALS)
  // Encoded non-curated model. Issues:
  // To be done
  // This model is described in the article:
  // Motor neuron-immune interactions: The vicious circle of ALS.
  // Barbeito AG, Mesci P, Boillée S.
  // J Neural Transm (Vienna). 2010 Aug;117(8):981-1000.
  // Abstract:
  // Because microglial cells, the resident macrophages of the CNS, react to any lesion of the nervous system,
  // they have for long been regarded as potential players in the pathogenesis of several neurodegenerative disorders including amyotrophic lateral sclerosis,
  // the most common motor neuron disease in the adult.
  // In recent years, this microglial reaction to motor neuron injury, in particular, and the innate immune response, in general,
  // has been implicated in the progression of the disease, in mouse models of ALS.
  // The mechanisms by which microglial cells influence motor neuron death in ALS are still largely unknown.
  // Microglial activation increases over the course of the disease and is associated with an alteration in the production of toxic factors and also
  // neurotrophic factors.
  // Adding to the microglial/macrophage response to motor neuron degeneration, the adaptive immune system can likewise influence the disease process.
  // Exploring these motor neuron-immune interactions could lead to a better understanding in the physiopathology of ALS to find
  // new pathways to slow down motor neuron degeneration.
  // This model will be hosted on BioModels Database and identified by: MODEL-to-be-done .
  // To cite BioModels Database, please use: BioModels Database: An enhanced, curated and annotated resource for published quantitative kinetic models .
  // To the extent possible under law, all copyright and related or neighbouring rights to this encoded model have been dedicated to the public domain worldwide. Please refer to CC0 Public Domain Dedication for more information.

  // Compartments:
  compartment CentralNervousSystem = 1;

  // Species:
  // Surviving neurons
  species $LivingNeurons in CentralNervousSystem = 10000;
  // Dead neurons
  species $DeadNeurons in CentralNervousSystem = 100;
  // Quiescent astroglia
  species $Quiescent_Astroglia in CentralNervousSystem = 100000;
  // Proliferating astroglia
  species $Profilerating_Astroglia in CentralNervousSystem = 1000;
  // Normal microglia
  species $Anti_Inflammatory_Microglia in CentralNervousSystem = 100000;
  // Reactive microglia
  species $ProInflammatoryMicroglia in CentralNervousSystem = 1000;

  // Parameters:
  a1 = 1;
  a2 = 1;
  a3 = 1;
  a4 = 1;
  a5 = 1;
  a6 = 0.5;
  a7 = 0.5;
  a8 = 1;
  a9 = 1;
  a10 = 1;
  a11 = 0.5;
  a12 = 0.5;
  a13 = 1;
  a14 = 1;
  a15 = 1;
  a16 = 1;
  ar = 1;
  NbOfNeurons = 1000000; NbOfNeurons is "Number of neurons";
  NbOfMicroglia = 100000; NbOfMicroglia is "Nb of microglia";
  NbOfAstrocytes = 200000; NbOfAstrocytes is "Nb of astrocytes";

  // Rate rules:
  LivingNeurons' = a1*Quiescent_Astroglia - a2*Profilerating_Astroglia - a3*ProInflammatoryMicroglia;
  DeadNeurons' = NbOfNeurons - LivingNeurons;
  Quiescent_Astroglia' = a4*Anti_Inflammatory_Microglia - a5*ProInflammatoryMicroglia;
  Profilerating_Astroglia' = NbOfAstrocytes - Profilerating_Astroglia;
  Anti_Inflammatory_Microglia' = (a6 + a11)*LivingNeurons - a10*DeadNeurons + (a7 + a12)*Quiescent_Astroglia - a9*ProInflammatoryMicroglia + a14*Anti_Inflammatory_Microglia;
  ProInflammatoryMicroglia' = NbOfMicroglia - Anti_Inflammatory_Microglia;

  // Events:
  _3_years: at (time >= 3): a16 = ar;

  // Unit definitions:
  unit volume = 1e-3 litre;
  unit time = 86400 second;
  unit substance = dimensionless;
end
